    <aerodynamics>
    <fileheader>
        <author>Richard Harrison</author>
        <filecreationdate>2018-03-15</filecreationdate>
        <version>1.0</version>
        <copyright>Copyright (C) 2016 Richard Harrison, All rights reserved</copyright>
        <description></description>
        <note>
            ailerons, 25degrees either deflection Roll: fcs/roll-pos-deg
            elevator(TE UP), 30 up, 17 down (FBW limits it to 20 up 17 down after 70kts)  Pitch: fcs/pitch-pos-deg
            rudder 25degrees either way fcs/yaw-pos-deg
            spoilers 35 degrees each spoiler(edited) fcs/speedbrake-left-deg fcs/speedbrake-right-deg
            slats 0 - 27 degrees fcs/slat-pos-deg
            flaps 0 - 35 degrees fcs/flap-pos-deg
            stabilator (LE up) (elevator trim): +4.0 -12.5 fcs/pitch-trim-pos-deg
        </note>
        <note>Built with AeroTool 1.0.0.0: Options: AeroDetail=Full, MultiSampleAero, MultiSampleDerivatives, Gear, Flaps, ExternalTanks, WakeIterations=4</note>
        <limitation></limitation>
        <reference
            refID="ZDAT/AED/2018/03-07"
            author="Richard Harrison, rjh@zaretto.com"
            title="A320 200 Aerodynamic data built from vspaero; CG (15.3, 0, 0)M"
            date="March 7, 2018"
            URL="http://www.zaretto.com/sites/zaretto.com/files/A320-200-data/rjh-zaretto-A320-200-aerodynamic-data-vspaero.pdf"
        />
    </fileheader>
    <function name="aero/c/CFXB">
    <description>BASE DRAG</description>
    <product>
          <table>
            <independentVar lookup="row">aero/alpha-deg</independentVar>
            <independentVar lookup="column">aero/beta-deg</independentVar>
            <tableData>
                                -20	        -10	         -5	         -2	          0	          2	          5	         10	         20
                    -10	    0.09952	    0.09178	    0.08933	    0.08866	    0.08855	    0.08866	    0.08933	    0.09178	    0.10141
                     -5	    0.08116	    0.06526	    0.06079	    0.05951	    0.05927	    0.05951	    0.06079	    0.06526	    0.08117
                     -2	    0.07783	    0.05958	    0.05422	    0.05268	    0.05233	    0.05265	    0.05422	    0.05958	    0.07783
                      0	    0.07954	    0.06052	    0.05497	    0.05332	    0.05301	    0.05332	    0.05497	    0.06052	    0.07954
                      1	    0.08159	    0.06243	    0.05689	    0.05524	    0.05493	    0.05524	    0.05689	    0.06243	    0.08159
                      2	    0.08448	    0.06528	    0.05978	    0.05815	    0.05783	    0.05815	    0.05978	    0.06528	    0.08448
                      3	    0.08834	    0.06904	    0.06363	    0.06201	    0.06168	    0.06201	    0.06363	    0.06904	    0.08834
                      4	    0.09445	    0.07397	    0.06854	    0.06670	    0.06644	    0.06670	    0.06854	    0.07397	    0.09445
                      5	    0.10636	    0.08124	    0.07488	    0.07214	    0.07202	    0.07214	    0.07488	    0.08124	    0.10636
                      6	    0.12085	    0.09102	    0.08213	    0.07890	    0.07845	    0.07890	    0.08213	    0.09102	    0.11957
                      7	    0.12131	    0.09641	    0.08884	    0.08641	    0.08549	    0.08641	    0.08884	    0.09641	    0.12003
                      8	    0.12029	    0.10258	    0.09624	    0.09403	    0.09319	    0.09403	    0.09624	    0.10256	    0.12029
                      9	    0.12422	    0.11164	    0.10475	    0.10247	    0.10185	    0.10247	    0.10476	    0.11164	    0.12422
                     10	    0.12966	    0.11833	    0.11335	    0.11173	    0.11123	    0.11173	    0.11336	    0.11833	    0.12966
                     11	    0.13601	    0.12609	    0.12232	    0.12137	    0.12106	    0.12137	    0.12232	    0.12609	    0.13600
                     12	    0.14311	    0.13516	    0.13172	    0.13088	    0.13067	    0.13006	    0.13172	    0.13516	    0.14310
                     13	    0.15093	    0.14486	    0.14115	    0.14017	    0.13998	    0.13937	    0.14115	    0.14486	    0.15093
                     14	    0.15930	    0.15474	    0.15062	    0.14946	    0.14922	    0.14946	    0.15062	    0.15474	    0.15930
                     15	    0.16793	    0.16420	    0.15997	    0.15853	    0.15822	    0.15853	    0.15997	    0.16420	    0.16793
                     16	    0.17668	    0.17356	    0.16922	    0.16741	    0.16703	    0.16741	    0.16922	    0.17356	    0.17668
                     17	    0.18530	    0.18225	    0.17808	    0.17602	    0.17550	    0.17612	    0.17809	    0.18225	    0.18530
                     18	    0.19424	    0.19038	    0.18628	    0.18397	    0.18336	    0.18407	    0.18615	    0.19044	    0.19424
                     19	    0.20269	    0.19851	    0.19359	    0.19117	    0.19038	    0.19120	    0.19347	    0.19851	    0.20269
                     20	    0.21039	    0.20685	    0.19985	    0.19806	    0.19721	    0.19849	    0.19985	    0.20685	    0.21039
                     30	    0.26602	    0.25858	    0.25600	    0.25462	    0.25445	    0.25462	    0.25599	    0.25858	    0.26606
                     60	    0.32701	    0.32347	    0.32314	    0.32283	    0.32285	    0.32283	    0.32314	    0.32349	    0.32701
            </tableData>
          </table>
       </product>
    </function>
    <function name="aero/c/CFXDAD">
    <description>DRAG INCREMENT DUE TO AILERON DEFLECTION</description>
    <product>
          <property>fcs/roll-pos-deg</property>
          <table>
            <independentVar lookup="row">aero/alpha-deg</independentVar>
            <independentVar lookup="column">aero/beta-deg</independentVar>
            <tableData>
                                -20	        -10	         -5	         -2	          0	          2	          5	         10	         20
                    -10	  -0.00032	  -0.00022	  -0.00020	  -0.00019	  -0.00018	  -0.00017	  -0.00016	  -0.00014	  -0.00011
                     -5	  -0.00032	  -0.00030	  -0.00027	  -0.00026	  -0.00025	  -0.00024	  -0.00022	  -0.00020	  -0.00013
                     -2	  -0.00032	  -0.00030	  -0.00028	  -0.00026	  -0.00025	  -0.00024	  -0.00022	  -0.00019	  -0.00011
                      0	  -0.00030	  -0.00029	  -0.00028	  -0.00026	  -0.00025	  -0.00024	  -0.00022	  -0.00018	  -0.00010
                      1	  -0.00029	  -0.00028	  -0.00027	  -0.00026	  -0.00025	  -0.00024	  -0.00022	  -0.00018	  -0.00010
                      2	  -0.00027	  -0.00027	  -0.00026	  -0.00025	  -0.00024	  -0.00023	  -0.00021	  -0.00018	  -0.00009
                      3	  -0.00025	  -0.00026	  -0.00024	  -0.00024	  -0.00023	  -0.00022	  -0.00021	  -0.00017	  -0.00009
                      4	  -0.00024	  -0.00024	  -0.00023	  -0.00022	  -0.00022	  -0.00021	  -0.00020	  -0.00017	  -0.00009
                      5	  -0.00023	  -0.00023	  -0.00022	  -0.00021	  -0.00021	  -0.00020	  -0.00019	  -0.00016	  -0.00008
                      6	  -0.00022	  -0.00021	  -0.00020	  -0.00019	  -0.00019	  -0.00019	  -0.00017	  -0.00016	  -0.00012
                      7	  -0.00020	  -0.00020	  -0.00019	  -0.00018	  -0.00017	  -0.00017	  -0.00016	  -0.00014	  -0.00012
                      8	  -0.00017	  -0.00019	  -0.00017	  -0.00016	  -0.00016	  -0.00015	  -0.00014	  -0.00013	  -0.00009
                      9	  -0.00015	  -0.00016	  -0.00015	  -0.00014	  -0.00014	  -0.00013	  -0.00013	  -0.00011	  -0.00009
                     10	  -0.00012	  -0.00014	  -0.00013	  -0.00012	  -0.00012	  -0.00012	  -0.00011	  -0.00010	  -0.00011
                     11	  -0.00011	  -0.00012	  -0.00011	  -0.00010	  -0.00009	  -0.00010	  -0.00010	  -0.00010	  -0.00012
                     12	  -0.00009	  -0.00011	  -0.00009	  -0.00009	  -0.00008	  -0.00011	  -0.00008	  -0.00008	  -0.00012
                     13	  -0.00008	  -0.00009	  -0.00008	  -0.00008	  -0.00007	  -0.00010	  -0.00006	  -0.00007	  -0.00011
                     14	  -0.00006	  -0.00008	  -0.00008	  -0.00007	  -0.00006	  -0.00006	  -0.00005	  -0.00005	  -0.00011
                     15	  -0.00004	  -0.00007	  -0.00006	  -0.00006	  -0.00005	  -0.00005	  -0.00004	  -0.00004	  -0.00010
                     16	  -0.00002	  -0.00006	  -0.00001	  -0.00005	  -0.00004	  -0.00004	  -0.00003	  -0.00003	  -0.00010
                     17	  -0.00001	  -0.00005	   0.00000	  -0.00004	  -0.00003	  -0.00003	  -0.00003	  -0.00006	  -0.00009
                     18	    0.00000	  -0.00004	  -0.00003	  -0.00003	  -0.00003	  -0.00002	  -0.00002	  -0.00002	  -0.00007
                     19	    0.00000	  -0.00008	  -0.00002	  -0.00002	  -0.00002	  -0.00002	  -0.00001	  -0.00001	  -0.00006
                     20	    0.00001	  -0.00002	  -0.00002	  -0.00002	  -0.00001	    0.00000	  -0.00002	  -0.00001	  -0.00005
                     30	  -0.00001	  -0.00001	   0.00000	   0.00000	   0.00000	   0.00000	   0.00000	   0.00000	    0.00000
                     60	  -0.00001	    0.00000	    0.00001	    0.00001	    0.00001	    0.00001	    0.00002	    0.00002	    0.00004
            </tableData>
          </table>
       </product>
    </function>
    <function name="aero/c/CFXDRD">
    <description>DRAG INCREMENT DUE TO RUDDER DEFLECTION</description>
    <product>
          <property>fcs/yaw-pos-deg</property>
          <table>
            <independentVar lookup="row">aero/alpha-deg</independentVar>
            <independentVar lookup="column">aero/beta-deg</independentVar>
            <tableData>
                                -20	        -10	         -5	         -2	          0	          2	          5	         10	         20
                    -10	  -0.00065	  -0.00070	  -0.00059	  -0.00049	  -0.00042	  -0.00033	  -0.00020	    0.00003	    0.00047
                     -5	  -0.00066	  -0.00069	  -0.00056	  -0.00045	  -0.00037	  -0.00028	  -0.00015	    0.00007	    0.00049
                     -2	  -0.00067	  -0.00068	  -0.00053	  -0.00041	  -0.00033	  -0.00024	  -0.00012	    0.00009	    0.00050
                      0	  -0.00067	  -0.00068	  -0.00050	  -0.00038	  -0.00030	  -0.00022	  -0.00010	    0.00010	    0.00052
                      1	  -0.00067	  -0.00067	  -0.00049	  -0.00037	  -0.00029	  -0.00021	  -0.00010	    0.00011	    0.00052
                      2	  -0.00067	  -0.00067	  -0.00049	  -0.00036	  -0.00028	  -0.00020	  -0.00009	    0.00012	    0.00053
                      3	  -0.00068	  -0.00066	  -0.00048	  -0.00035	  -0.00027	  -0.00020	  -0.00008	    0.00012	    0.00054
                      4	  -0.00069	  -0.00066	  -0.00047	  -0.00035	  -0.00026	  -0.00019	  -0.00007	    0.00013	    0.00056
                      5	  -0.00076	  -0.00068	  -0.00048	  -0.00034	  -0.00026	  -0.00018	  -0.00005	    0.00017	    0.00064
                      6	  -0.00085	  -0.00072	  -0.00050	  -0.00036	  -0.00025	  -0.00015	  -0.00001	    0.00023	    0.00073
                      7	  -0.00082	  -0.00071	  -0.00051	  -0.00037	  -0.00024	  -0.00012	    0.00001	    0.00023	    0.00067
                      8	  -0.00074	  -0.00075	  -0.00054	  -0.00035	  -0.00024	  -0.00014	    0.00006	    0.00028	    0.00062
                      9	  -0.00071	  -0.00083	  -0.00057	  -0.00036	  -0.00024	  -0.00012	    0.00009	    0.00038	    0.00058
                     10	  -0.00069	  -0.00072	  -0.00051	  -0.00038	  -0.00023	  -0.00009	    0.00003	    0.00027	    0.00057
                     11	  -0.00068	  -0.00065	  -0.00046	  -0.00036	  -0.00023	  -0.00009	  -0.00001	    0.00021	    0.00056
                     12	  -0.00067	  -0.00063	  -0.00044	  -0.00032	  -0.00023	  -0.00015	  -0.00001	    0.00021	    0.00055
                     13	  -0.00067	  -0.00063	  -0.00044	  -0.00030	  -0.00023	  -0.00017	  -0.00001	    0.00022	    0.00055
                     14	  -0.00068	  -0.00063	  -0.00043	  -0.00030	  -0.00022	  -0.00012	    0.00001	    0.00024	    0.00057
                     15	  -0.00069	  -0.00063	  -0.00043	  -0.00030	  -0.00020	  -0.00010	    0.00004	    0.00026	    0.00059
                     16	  -0.00069	  -0.00063	  -0.00043	  -0.00030	  -0.00019	  -0.00008	    0.00007	    0.00029	    0.00060
                     17	  -0.00069	  -0.00063	  -0.00045	  -0.00030	  -0.00016	  -0.00003	    0.00012	    0.00032	    0.00061
                     18	  -0.00069	  -0.00064	  -0.00046	  -0.00030	  -0.00013	    0.00001	    0.00015	    0.00032	    0.00063
                     19	  -0.00070	  -0.00064	  -0.00044	  -0.00030	  -0.00014	    0.00002	    0.00016	    0.00037	    0.00064
                     20	  -0.00070	  -0.00066	  -0.00039	  -0.00032	  -0.00015	    0.00005	    0.00011	    0.00042	    0.00065
                     30	  -0.00057	  -0.00039	  -0.00034	  -0.00019	  -0.00009	    0.00001	    0.00016	    0.00024	    0.00054
                     60	  -0.00001	  -0.00002	  -0.00001	   0.00000	   0.00000	    0.00000	    0.00015	    0.00003	    0.00009
            </tableData>
          </table>
       </product>
    </function>
    <function name="aero/c/CFZB">
    <description>BASE LIFT</description>
    <product>
          <table>
            <independentVar lookup="row">aero/alpha-deg</independentVar>
            <independentVar lookup="column">fcs/pitch-pos-deg</independentVar>
            <tableData>
                                -17	        -15	        -10	         -5	          0	          5	         10	         15	         20	         25	         30
                    -10	  -1.02195	  -1.01022	  -0.96320	  -0.91252	  -0.86114	  -0.81071	  -0.76186	  -0.71563	  -0.67314	  -0.63545	  -0.60334
                     -5	  -0.48490	  -0.46703	  -0.42025	  -0.37172	  -0.32307	  -0.27559	  -0.22963	  -0.18599	  -0.14534	  -0.10878	  -0.07740
                     -2	  -0.19286	  -0.17534	  -0.12966	  -0.08259	  -0.03574	    0.00997	    0.05485	    0.09826	    0.13884	    0.17527	    0.20642
                      0	  -0.00799	    0.00900	    0.05332	    0.09900	    0.14451	    0.18978	    0.23520	    0.27930	    0.32057	    0.35763	    0.38908
                      1	    0.08307	    0.09989	    0.14372	    0.18885	    0.23386	    0.27934	    0.32500	    0.36928	    0.41067	    0.44780	    0.47766
                      2	    0.17522	    0.19193	    0.23542	    0.28011	    0.32498	    0.37071	    0.41653	    0.46088	    0.50223	    0.53926	    0.56576
                      3	    0.26941	    0.28603	    0.32921	    0.37359	    0.41865	    0.46467	    0.51069	    0.55512	    0.59646	    0.63341	    0.65621
                      4	    0.36588	    0.38243	    0.42539	    0.46974	    0.51515	    0.56153	    0.60791	    0.65255	    0.69372	    0.72989	    0.74985
                      5	    0.46448	    0.48103	    0.52403	    0.56877	    0.61472	    0.66162	    0.70827	    0.75310	    0.79462	    0.82883	    0.84735
                      6	    0.56489	    0.58163	    0.62515	    0.67075	    0.71757	    0.76527	    0.81259	    0.85797	    0.89991	    0.93126	    0.94856
                      7	    0.66823	    0.68510	    0.72926	    0.77565	    0.82320	    0.87186	    0.91986	    0.96576	    1.00819	    1.03629	    1.05225
                      8	    0.77465	    0.79174	    0.83655	    0.88363	    0.93198	    0.98141	    1.03001	    1.07660	    1.11885	    1.14407	    1.15813
                      9	    0.88457	    0.90192	    0.94753	    0.99583	    1.04513	    1.09517	    1.14448	    1.19158	    1.23170	    1.25440	    1.26673
                     10	    0.99856	    1.01616	    1.06244	    1.11108	    1.16103	    1.21170	    1.26149	    1.30873	    1.34481	    1.36506	    1.37714
                     11	    1.10913	    1.12670	    1.17282	    1.22128	    1.27094	    1.32100	    1.37010	    1.41664	    1.44753	    1.46475	    1.47617
                     12	    1.19121	    1.20840	    1.25361	    1.30103	    1.34962	    1.39842	    1.44612	    1.49035	    1.51645	    1.53031	    1.53996
                     13	    1.24915	    1.26615	    1.31083	    1.35766	    1.40577	    1.45424	    1.50153	    1.54237	    1.56481	    1.57713	    1.58411
                     14	    1.29925	    1.31627	    1.36091	    1.40764	    1.45566	    1.50407	    1.55133	    1.58746	    1.60675	    1.61869	    1.62314
                     15	    1.34310	    1.36014	    1.40481	    1.45154	    1.49955	    1.54788	    1.59490	    1.62577	    1.64186	    1.65165	    1.65500
                     16	    1.38127	    1.39840	    1.44341	    1.49043	    1.53874	    1.58727	    1.63300	    1.65882	    1.67213	    1.67943	    1.68271
                     17	    1.41454	    1.43175	    1.47689	    1.52413	    1.57255	    1.62119	    1.66244	    1.68383	    1.69578	    1.70065	    1.70383
                     18	    1.43968	    1.45700	    1.50240	    1.54975	    1.59853	    1.64730	    1.68266	    1.70066	    1.71022	    1.71412	    1.71731
                     19	    1.45600	    1.47348	    1.51925	    1.56687	    1.61609	    1.66457	    1.69355	    1.70900	    1.71519	    1.71911	    1.72232
                     20	    1.47003	    1.48775	    1.53416	    1.58193	    1.63115	    1.67612	    1.69933	    1.71217	    1.71675	    1.72064	    1.72381
                     30	    1.63438	    1.65307	    1.68753	    1.70251	    1.70609	    1.70672	    1.70720	    1.70756	    1.70784	    1.70806	    1.70821
                     60	    1.58237	    1.58278	    1.58376	    1.58459	    1.58529	    1.58584	    1.58625	    1.58654	    1.58672	    1.58682	    1.58685
            </tableData>
          </table>
       </product>
    </function>
    <function name="aero/c/CFZDAD">
    <description>LIFT INCREMENT DUE TO AILERON DEFLECTION</description>
    <product>
          <property>fcs/roll-pos-deg</property>
          <table>
            <independentVar lookup="row">aero/alpha-deg</independentVar>
            <independentVar lookup="column">aero/beta-deg</independentVar>
            <tableData>
                                -20	        -10	         -5	         -2	          0	          2	          5	         10	         20
                    -10	  -0.00199	  -0.00233	  -0.00222	  -0.00207	  -0.00195	  -0.00181	  -0.00157	  -0.00110	  -0.00014
                     -5	  -0.00155	  -0.00086	  -0.00048	  -0.00026	  -0.00011	    0.00006	    0.00031	    0.00077	    0.00142
                     -2	  -0.00138	  -0.00093	  -0.00045	  -0.00012	    0.00010	    0.00031	    0.00061	    0.00110	    0.00172
                      0	  -0.00103	  -0.00077	  -0.00049	  -0.00025	  -0.00005	    0.00019	    0.00053	    0.00106	    0.00179
                      1	  -0.00078	  -0.00054	  -0.00035	  -0.00020	  -0.00007	    0.00014	    0.00050	    0.00106	    0.00185
                      2	  -0.00051	  -0.00027	  -0.00008	    0.00002	    0.00009	    0.00019	    0.00049	    0.00107	    0.00192
                      3	  -0.00022	    0.00003	    0.00022	    0.00032	    0.00038	    0.00044	    0.00056	    0.00111	    0.00200
                      4	    0.00010	    0.00036	    0.00054	    0.00064	    0.00070	    0.00076	    0.00083	    0.00116	    0.00208
                      5	    0.00044	    0.00071	    0.00089	    0.00100	    0.00104	    0.00110	    0.00116	    0.00128	    0.00216
                      6	    0.00080	    0.00108	    0.00126	    0.00136	    0.00141	    0.00146	    0.00151	    0.00155	    0.00224
                      7	    0.00121	    0.00146	    0.00164	    0.00173	    0.00178	    0.00183	    0.00187	    0.00189	    0.00231
                      8	    0.00176	    0.00193	    0.00204	    0.00213	    0.00217	    0.00223	    0.00224	    0.00224	    0.00231
                      9	    0.00210	    0.00256	    0.00256	    0.00257	    0.00258	    0.00262	    0.00263	    0.00253	    0.00178
                     10	    0.00222	    0.00296	    0.00324	    0.00320	    0.00312	    0.00305	    0.00286	    0.00230	    0.00118
                     11	    0.00229	    0.00305	    0.00353	    0.00369	    0.00358	    0.00329	    0.00270	    0.00200	    0.00091
                     12	    0.00236	    0.00312	    0.00352	    0.00343	    0.00328	    0.00308	    0.00274	    0.00193	    0.00062
                     13	    0.00241	    0.00317	    0.00306	    0.00287	    0.00283	    0.00277	    0.00266	    0.00203	    0.00040
                     14	    0.00247	    0.00295	    0.00257	    0.00250	    0.00246	    0.00240	    0.00233	    0.00203	    0.00021
                     15	    0.00252	    0.00248	    0.00226	    0.00215	    0.00208	    0.00200	    0.00192	    0.00176	    0.00002
                     16	    0.00257	    0.00216	    0.00191	    0.00178	    0.00170	    0.00160	    0.00151	    0.00134	  -0.00017
                     17	    0.00261	    0.00180	    0.00156	    0.00140	    0.00130	    0.00122	    0.00106	    0.00085	  -0.00009
                     18	    0.00247	    0.00151	    0.00120	    0.00100	    0.00090	    0.00081	    0.00070	    0.00062	    0.00013
                     19	    0.00211	    0.00118	    0.00083	    0.00063	    0.00057	    0.00053	    0.00048	    0.00041	    0.00010
                     20	    0.00186	    0.00086	    0.00051	    0.00042	    0.00038	    0.00038	    0.00024	    0.00021	    0.00004
                     30	    0.00016	    0.00010	    0.00008	    0.00007	    0.00005	    0.00004	    0.00003	    0.00002	    0.00000
                     60	    0.00005	    0.00004	    0.00004	    0.00004	    0.00004	    0.00005	    0.00005	    0.00005	    0.00007
            </tableData>
          </table>
       </product>
    </function>
    <function name="aero/c/CFZDDS">
    <description>LIFT INCREMENT DUE TO PITCH TRIM</description>
    <product>
          <table>
            <independentVar lookup="row">aero/alpha-deg</independentVar>
            <independentVar lookup="column">fcs/pitch-trim-pos-deg</independentVar>
            <tableData>
                                 -4	         12
                    -10	  -0.12883	    0.33756
                     -5	  -0.11814	    0.33775
                     -2	  -0.11152	    0.32701
                      0	  -0.10716	    0.31600
                      1	  -0.10512	    0.31166
                      2	  -0.10343	    0.30776
                      3	  -0.10218	    0.30426
                      4	  -0.10152	    0.30071
                      5	  -0.10163	    0.29673
                      6	  -0.10328	    0.29172
                      7	  -0.10516	    0.28700
                      8	  -0.10746	    0.28092
                      9	  -0.11125	    0.27305
                     10	  -0.11442	    0.26513
                     11	  -0.11491	    0.24918
                     12	  -0.11348	    0.22877
                     13	  -0.11328	    0.21325
                     14	  -0.11415	    0.19876
                     15	  -0.11530	    0.18278
                     16	  -0.11727	    0.16747
                     17	  -0.11874	    0.15060
                     18	  -0.12059	    0.13417
                     19	  -0.12256	    0.11776
                     20	  -0.12458	    0.10016
                     30	  -0.04485	  -0.00564
                     60	    0.00296	  -0.01089
            </tableData>
          </table>
       </product>
    </function>
    <function name="aero/c/CFZDRD">
    <description>LIFT INCREMENT DUE TO RUDDER DEFLECTION</description>
    <product>
          <property>fcs/yaw-pos-deg</property>
          <table>
            <independentVar lookup="row">aero/alpha-deg</independentVar>
            <independentVar lookup="column">aero/beta-deg</independentVar>
            <tableData>
                                -20	        -10	         -5	         -2	          0	          2	          5	         10	         20
                    -10	    0.00052	    0.00023	    0.00018	    0.00014	    0.00012	    0.00009	    0.00006	    0.00002	  -0.00004
                     -5	    0.00048	    0.00018	    0.00018	    0.00018	    0.00016	    0.00013	    0.00009	    0.00007	    0.00008
                     -2	    0.00044	    0.00013	    0.00014	    0.00017	    0.00019	    0.00014	    0.00010	    0.00010	    0.00016
                      0	    0.00039	    0.00007	    0.00009	    0.00010	    0.00010	    0.00010	    0.00010	    0.00012	    0.00022
                      1	    0.00037	    0.00004	    0.00006	    0.00004	    0.00000	    0.00007	    0.00010	    0.00014	    0.00025
                      2	    0.00035	    0.00002	    0.00003	    0.00002	    0.00001	    0.00006	    0.00010	    0.00015	    0.00028
                      3	    0.00033	  -0.00001	    0.00001	    0.00001	    0.00002	    0.00006	    0.00010	    0.00016	    0.00031
                      4	    0.00032	  -0.00003	    0.00000	    0.00001	    0.00003	    0.00006	    0.00011	    0.00018	    0.00033
                      5	    0.00029	  -0.00005	  -0.00001	    0.00001	    0.00003	    0.00009	    0.00013	    0.00019	    0.00036
                      6	    0.00024	  -0.00008	  -0.00002	    0.00002	    0.00005	    0.00009	    0.00013	    0.00021	    0.00040
                      7	    0.00022	  -0.00010	  -0.00003	    0.00001	    0.00004	    0.00007	    0.00013	    0.00021	    0.00041
                      8	    0.00022	  -0.00012	  -0.00002	  -0.00002	    0.00003	    0.00010	    0.00011	    0.00023	    0.00042
                      9	    0.00021	  -0.00006	    0.00002	    0.00005	    0.00004	    0.00004	    0.00007	    0.00016	    0.00044
                     10	    0.00021	  -0.00004	    0.00007	    0.00008	    0.00005	    0.00001	    0.00005	    0.00015	    0.00045
                     11	    0.00021	  -0.00005	    0.00003	    0.00004	    0.00006	    0.00008	    0.00008	    0.00018	    0.00047
                     12	    0.00019	  -0.00006	    0.00003	    0.00005	    0.00007	    0.00008	    0.00010	    0.00021	    0.00048
                     13	    0.00015	  -0.00007	    0.00005	    0.00006	    0.00008	    0.00005	    0.00008	    0.00023	    0.00051
                     14	    0.00010	  -0.00010	    0.00006	    0.00008	    0.00008	    0.00006	    0.00009	    0.00027	    0.00055
                     15	    0.00004	  -0.00011	    0.00005	    0.00010	    0.00009	    0.00006	    0.00010	    0.00027	    0.00059
                     16	  -0.00002	  -0.00015	    0.00006	    0.00011	    0.00010	    0.00006	    0.00011	    0.00032	    0.00063
                     17	  -0.00005	  -0.00022	  -0.00001	    0.00010	    0.00021	    0.00021	    0.00025	    0.00040	    0.00066
                     18	  -0.00010	  -0.00026	  -0.00011	    0.00016	    0.00040	    0.00042	    0.00033	    0.00035	    0.00070
                     19	  -0.00016	  -0.00026	  -0.00015	    0.00005	    0.00028	    0.00032	    0.00033	    0.00041	    0.00073
                     20	  -0.00023	  -0.00029	  -0.00012	  -0.00009	    0.00010	    0.00027	    0.00029	    0.00046	    0.00078
                     30	  -0.00037	  -0.00008	    0.00011	    0.00020	    0.00021	    0.00016	    0.00007	    0.00015	    0.00061
                     60	  -0.00002	  -0.00003	  -0.00002	  -0.00001	    0.00000	    0.00001	    0.00004	    0.00006	    0.00016
            </tableData>
          </table>
       </product>
    </function>
    <function name="aero/c/CMM1">
    <description>BASE PITCHING MOMENT</description>
    <product>
          <table>
            <independentVar lookup="row">aero/alpha-deg</independentVar>
            <independentVar lookup="column">fcs/pitch-pos-deg</independentVar>
            <tableData>
                                -17	        -15	        -10	         -5	          0	          5	         10	         15	         20	         25	         30
                    -10	    1.07997	    1.03793	    0.86488	    0.67926	    0.49230	    0.31013	    0.13474	  -0.03046	  -0.18148	  -0.31487	  -0.42807
                     -5	    0.82106	    0.75416	    0.57950	    0.39913	    0.21924	    0.04452	  -0.12408	  -0.28375	  -0.43213	  -0.56530	  -0.67934
                     -2	    0.66642	    0.60032	    0.42838	    0.25176	    0.07653	  -0.09392	  -0.26109	  -0.42251	  -0.57317	  -0.70822	  -0.82355
                      0	    0.56547	    0.50113	    0.33358	    0.16115	  -0.01030	  -0.18066	  -0.35151	  -0.51733	  -0.67242	  -0.81162	  -0.92963
                      1	    0.51891	    0.45510	    0.28899	    0.11813	  -0.05206	  -0.22389	  -0.39640	  -0.56370	  -0.72006	  -0.86028	  -0.97258
                      2	    0.47434	    0.41084	    0.24574	    0.07617	  -0.09393	  -0.26728	  -0.44101	  -0.60917	  -0.76605	  -0.90651	  -1.00601
                      3	    0.43067	    0.36752	    0.20350	    0.03500	  -0.13598	  -0.31072	  -0.48551	  -0.65439	  -0.81165	  -0.95221	  -1.03737
                      4	    0.38801	    0.32524	    0.16229	  -0.00590	  -0.17802	  -0.35400	  -0.53018	  -0.69984	  -0.85659	  -0.99418	  -1.06818
                      5	    0.34627	    0.28389	    0.12186	  -0.04676	  -0.21995	  -0.39699	  -0.57337	  -0.74311	  -0.90057	  -1.02979	  -1.09775
                      6	    0.30542	    0.24341	    0.08181	  -0.08758	  -0.26166	  -0.43945	  -0.61631	  -0.78625	  -0.94367	  -1.06005	  -1.12270
                      7	    0.26527	    0.20351	    0.04184	  -0.12820	  -0.30274	  -0.48221	  -0.65965	  -0.82981	  -0.98753	  -1.08948	  -1.14529
                      8	    0.22548	    0.16367	    0.00137	  -0.16949	  -0.34522	  -0.52601	  -0.70408	  -0.87539	  -1.03102	  -1.12044	  -1.16813
                      9	    0.18383	    0.12164	  -0.04198	  -0.21568	  -0.39344	  -0.57490	  -0.75445	  -0.92659	  -1.07274	  -1.15127	  -1.19165
                     10	    0.13838	    0.07578	  -0.08923	  -0.26307	  -0.44229	  -0.62507	  -0.80559	  -0.97777	  -1.10719	  -1.17599	  -1.21504
                     11	    0.09510	    0.03228	  -0.13312	  -0.30750	  -0.48719	  -0.67022	  -0.85067	  -1.02247	  -1.13410	  -1.19382	  -1.23244
                     12	    0.06337	    0.00037	  -0.16567	  -0.34050	  -0.52071	  -0.70392	  -0.88428	  -1.05197	  -1.14873	  -1.19902	  -1.23372
                     13	    0.03721	  -0.02610	  -0.19298	  -0.36854	  -0.54962	  -0.73344	  -0.91402	  -1.06995	  -1.15410	  -1.19979	  -1.22556
                     14	    0.00951	  -0.05414	  -0.22195	  -0.39836	  -0.58039	  -0.76484	  -0.94567	  -1.08337	  -1.15592	  -1.20053	  -1.21715
                     15	  -0.02175	  -0.08578	  -0.25458	  -0.43186	  -0.61487	  -0.79997	  -0.98091	  -1.09877	  -1.15994	  -1.19728	  -1.21040
                     16	  -0.05638	  -0.12081	  -0.29054	  -0.46867	  -0.65259	  -0.83827	  -1.01404	  -1.11252	  -1.16584	  -1.19171	  -1.20479
                     17	  -0.09511	  -0.15997	  -0.33068	  -0.51013	  -0.69503	  -0.88170	  -1.04044	  -1.12257	  -1.17137	  -1.18868	  -1.20175
                     18	  -0.13976	  -0.20502	  -0.37667	  -0.55716	  -0.74286	  -0.93008	  -1.06571	  -1.13491	  -1.17237	  -1.18845	  -1.20149
                     19	  -0.18972	  -0.25537	  -0.42785	  -0.60882	  -0.79569	  -0.98135	  -1.09191	  -1.15126	  -1.17614	  -1.19215	  -1.20510
                     20	  -0.24337	  -0.30977	  -0.48418	  -0.66516	  -0.85248	  -1.02431	  -1.11294	  -1.16268	  -1.18168	  -1.19764	  -1.21053
                     30	  -0.86139	  -0.92995	  -1.05756	  -1.11615	  -1.13500	  -1.14298	  -1.14954	  -1.15491	  -1.15923	  -1.16263	  -1.16524
                     60	  -0.72019	  -0.72316	  -0.73028	  -0.73678	  -0.74243	  -0.74709	  -0.75072	  -0.75333	  -0.75502	  -0.75594	  -0.75628
            </tableData>
          </table>
       </product>
    </function>
    <function name="aero/c/CMMALPHADOT">
    <description>PITCH MOMENT DERIVATIVE FOR ALPHA DOT</description>
    <product>
          <property>aero/alphadot-rad_sec</property>
          <table>
            <independentVar lookup="row">aero/alpha-deg</independentVar>
            <tableData>
                    -10		  -4.21373
                     -5		  -3.31180
                     -2		  -1.94042
                      0		  -2.90695
                      1		  -2.90827
                      2		  -2.97006
                      3		  -2.99523
                      4		  -3.00382
                      5		  -2.59190
                      6		  -2.77191
                      7		  -3.13156
                      8		  -3.28247
                      9		  -2.40228
                     10		  -1.38011
                     11		  -2.83818
                     12		  -2.46833
                     13		  -2.50637
                     14		  -2.64390
                     15		  -2.85958
                     16		  -3.24023
                     17		  -3.53242
                     18		  -3.86003
                     19		  -0.16113
                     20		  -1.67125
                     30		    0.56222
                     60		    0.88664
            </tableData>
          </table>
       </product>
    </function>
    <function name="aero/c/CMMBETADOT">
    <description>PITCH MOMENT DERIVATIVE FOR BETA DOT</description>
    <product>
          <property>aero/betadot-rad_sec</property>
          <table>
            <independentVar lookup="row">aero/alpha-deg</independentVar>
            <tableData>
                    -10		  -0.02139
                     -5		  -0.03504
                     -2		    0.00940
                      0		    0.03398
                      1		    0.01182
                      2		  -0.00023
                      3		  -0.00272
                      4		  -0.00650
                      5		  -0.01276
                      6		  -0.01282
                      7		  -0.03482
                      8		  -0.05237
                      9		  -0.03617
                     10		  -0.02902
                     11		  -0.03861
                     12		  -0.03980
                     13		  -0.03135
                     14		  -0.03084
                     15		  -0.03433
                     16		  -0.03725
                     17		  -0.03117
                     18		  -0.02651
                     19		  -0.00837
                     20		  -0.00735
                     30		  -0.00111
                     60		  -0.00589
            </tableData>
          </table>
       </product>
    </function>
    <function name="aero/c/CMMDAD">
    <description>PITCH MOMENT DUE TO AILERON DEFLECTION</description>
    <product>
          <property>fcs/roll-pos-deg</property>
          <table>
            <independentVar lookup="row">aero/alpha-deg</independentVar>
            <independentVar lookup="column">aero/beta-deg</independentVar>
            <tableData>
                                -20	        -10	         -5	         -2	          0	          2	          5	         10	         20
                    -10	    0.00075	    0.00167	    0.00167	    0.00158	    0.00149	    0.00139	    0.00122	    0.00094	    0.00080
                     -5	    0.00085	    0.00078	    0.00044	    0.00022	    0.00006	  -0.00011	  -0.00036	  -0.00078	  -0.00079
                     -2	    0.00084	    0.00095	    0.00046	    0.00012	  -0.00012	  -0.00035	  -0.00068	  -0.00118	  -0.00127
                      0	    0.00062	    0.00081	    0.00050	    0.00023	    0.00001	  -0.00025	  -0.00062	  -0.00118	  -0.00143
                      1	    0.00044	    0.00062	    0.00037	    0.00018	    0.00002	  -0.00020	  -0.00060	  -0.00118	  -0.00152
                      2	    0.00024	    0.00040	    0.00015	  -0.00001	  -0.00012	  -0.00025	  -0.00059	  -0.00119	  -0.00160
                      3	    0.00000	    0.00018	  -0.00008	  -0.00025	  -0.00036	  -0.00046	  -0.00065	  -0.00123	  -0.00170
                      4	  -0.00024	  -0.00007	  -0.00034	  -0.00052	  -0.00062	  -0.00073	  -0.00088	  -0.00127	  -0.00178
                      5	  -0.00049	  -0.00034	  -0.00062	  -0.00081	  -0.00089	  -0.00101	  -0.00116	  -0.00137	  -0.00184
                      6	  -0.00074	  -0.00063	  -0.00091	  -0.00109	  -0.00119	  -0.00129	  -0.00144	  -0.00159	  -0.00189
                      7	  -0.00104	  -0.00093	  -0.00121	  -0.00139	  -0.00147	  -0.00159	  -0.00172	  -0.00186	  -0.00190
                      8	  -0.00143	  -0.00128	  -0.00151	  -0.00170	  -0.00177	  -0.00193	  -0.00201	  -0.00213	  -0.00184
                      9	  -0.00164	  -0.00170	  -0.00189	  -0.00203	  -0.00210	  -0.00221	  -0.00231	  -0.00237	  -0.00140
                     10	  -0.00171	  -0.00193	  -0.00236	  -0.00245	  -0.00249	  -0.00251	  -0.00252	  -0.00233	  -0.00098
                     11	  -0.00181	  -0.00198	  -0.00250	  -0.00274	  -0.00279	  -0.00273	  -0.00252	  -0.00219	  -0.00078
                     12	  -0.00189	  -0.00203	  -0.00250	  -0.00264	  -0.00266	  -0.00266	  -0.00253	  -0.00214	  -0.00050
                     13	  -0.00198	  -0.00208	  -0.00231	  -0.00233	  -0.00237	  -0.00242	  -0.00242	  -0.00215	  -0.00028
                     14	  -0.00206	  -0.00200	  -0.00197	  -0.00206	  -0.00210	  -0.00213	  -0.00216	  -0.00207	  -0.00013
                     15	  -0.00215	  -0.00181	  -0.00181	  -0.00182	  -0.00183	  -0.00179	  -0.00185	  -0.00183	    0.00006
                     16	  -0.00220	  -0.00159	  -0.00162	  -0.00155	  -0.00154	  -0.00148	  -0.00153	  -0.00149	    0.00024
                     17	  -0.00226	  -0.00128	  -0.00137	  -0.00128	  -0.00127	  -0.00131	  -0.00121	  -0.00110	    0.00023
                     18	  -0.00220	  -0.00116	  -0.00116	  -0.00100	  -0.00101	  -0.00101	  -0.00092	  -0.00086	    0.00009
                     19	  -0.00199	  -0.00091	  -0.00090	  -0.00073	  -0.00074	  -0.00075	  -0.00071	  -0.00062	    0.00016
                     20	  -0.00181	  -0.00086	  -0.00059	  -0.00057	  -0.00059	  -0.00067	  -0.00046	  -0.00040	    0.00020
                     30	  -0.00033	  -0.00024	  -0.00020	  -0.00015	  -0.00011	  -0.00008	  -0.00004	    0.00001	    0.00003
                     60	  -0.00004	  -0.00005	  -0.00005	  -0.00005	  -0.00006	  -0.00006	  -0.00007	  -0.00008	  -0.00011
            </tableData>
          </table>
       </product>
    </function>
    <function name="aero/c/CMMDDS">
    <description>PITCHING MOMENT INCREMENT DUE TO PITCH TRIM</description>
    <product>
          <table>
            <independentVar lookup="row">aero/alpha-deg</independentVar>
            <independentVar lookup="column">fcs/pitch-trim-pos-deg</independentVar>
            <tableData>
                                 -4	         12
                    -10	    0.45623	  -1.17218
                     -5	    0.42486	  -1.20255
                     -2	    0.40536	  -1.18027
                      0	    0.39245	  -1.14935
                      1	    0.38644	  -1.13492
                      2	    0.38164	  -1.11770
                      3	    0.37792	  -1.09440
                      4	    0.37533	  -1.06964
                      5	    0.37405	  -1.04471
                      6	    0.37438	  -1.01942
                      7	    0.37490	  -0.99600
                      8	    0.37812	  -0.97025
                      9	    0.38794	  -0.93877
                     10	    0.39689	  -0.90663
                     11	    0.40186	  -0.86671
                     12	    0.40698	  -0.81896
                     13	    0.41319	  -0.77055
                     14	    0.41974	  -0.72010
                     15	    0.42678	  -0.66717
                     16	    0.43347	  -0.61151
                     17	    0.44048	  -0.55321
                     18	    0.44731	  -0.49151
                     19	    0.45308	  -0.42928
                     20	    0.46003	  -0.36403
                     30	    0.15927	    0.01495
                     60	  -0.00591	    0.03496
            </tableData>
          </table>
       </product>
    </function>
    <function name="aero/c/CMMDRD">
    <description>PITCH MOMENT DUE TO RUDDER DEFLECTION</description>
    <product>
          <property>fcs/yaw-pos-deg</property>
          <table>
            <independentVar lookup="row">aero/alpha-deg</independentVar>
            <independentVar lookup="column">aero/beta-deg</independentVar>
            <tableData>
                                -20	        -10	         -5	         -2	          0	          2	          5	         10	         20
                    -10	  -0.00188	  -0.00077	  -0.00094	  -0.00106	  -0.00111	  -0.00114	  -0.00118	  -0.00136	  -0.00188
                     -5	  -0.00178	  -0.00062	  -0.00089	  -0.00109	  -0.00112	  -0.00108	  -0.00105	  -0.00124	  -0.00189
                     -2	  -0.00166	  -0.00043	  -0.00071	  -0.00097	  -0.00111	  -0.00100	  -0.00096	  -0.00119	  -0.00193
                      0	  -0.00153	  -0.00023	  -0.00048	  -0.00062	  -0.00071	  -0.00076	  -0.00088	  -0.00116	  -0.00198
                      1	  -0.00146	  -0.00012	  -0.00035	  -0.00040	  -0.00030	  -0.00062	  -0.00082	  -0.00115	  -0.00202
                      2	  -0.00140	  -0.00003	  -0.00025	  -0.00028	  -0.00030	  -0.00053	  -0.00078	  -0.00114	  -0.00205
                      3	  -0.00135	    0.00005	  -0.00019	  -0.00025	  -0.00032	  -0.00049	  -0.00074	  -0.00111	  -0.00208
                      4	  -0.00130	    0.00011	  -0.00016	  -0.00025	  -0.00034	  -0.00047	  -0.00070	  -0.00109	  -0.00209
                      5	  -0.00126	    0.00016	  -0.00016	  -0.00027	  -0.00033	  -0.00046	  -0.00067	  -0.00107	  -0.00210
                      6	  -0.00120	    0.00020	  -0.00013	  -0.00027	  -0.00037	  -0.00045	  -0.00065	  -0.00105	  -0.00212
                      7	  -0.00111	    0.00022	  -0.00011	  -0.00028	  -0.00034	  -0.00045	  -0.00063	  -0.00102	  -0.00210
                      8	  -0.00104	    0.00027	  -0.00010	  -0.00033	  -0.00032	  -0.00040	  -0.00060	  -0.00100	  -0.00209
                      9	  -0.00098	    0.00035	  -0.00006	  -0.00028	  -0.00036	  -0.00044	  -0.00062	  -0.00106	  -0.00209
                     10	  -0.00089	    0.00038	  -0.00006	  -0.00023	  -0.00038	  -0.00047	  -0.00065	  -0.00108	  -0.00206
                     11	  -0.00084	    0.00040	    0.00001	  -0.00022	  -0.00038	  -0.00048	  -0.00065	  -0.00105	  -0.00207
                     12	  -0.00078	    0.00043	    0.00004	  -0.00021	  -0.00034	  -0.00046	  -0.00063	  -0.00105	  -0.00205
                     13	  -0.00067	    0.00048	    0.00007	  -0.00015	  -0.00031	  -0.00043	  -0.00064	  -0.00106	  -0.00207
                     14	  -0.00052	    0.00053	    0.00011	  -0.00011	  -0.00028	  -0.00041	  -0.00063	  -0.00106	  -0.00216
                     15	  -0.00034	    0.00057	    0.00015	  -0.00009	  -0.00025	  -0.00041	  -0.00064	  -0.00107	  -0.00220
                     16	  -0.00021	    0.00063	    0.00018	  -0.00006	  -0.00024	  -0.00040	  -0.00063	  -0.00110	  -0.00221
                     17	  -0.00013	    0.00063	    0.00019	  -0.00004	  -0.00021	  -0.00042	  -0.00058	  -0.00114	  -0.00226
                     18	    0.00011	    0.00071	    0.00008	    0.00001	  -0.00014	  -0.00033	  -0.00056	  -0.00107	  -0.00242
                     19	    0.00037	    0.00077	    0.00009	  -0.00004	  -0.00015	  -0.00031	  -0.00057	  -0.00121	  -0.00256
                     20	    0.00067	    0.00087	    0.00022	  -0.00010	  -0.00021	  -0.00043	  -0.00066	  -0.00143	  -0.00274
                     30	    0.00125	    0.00029	  -0.00023	  -0.00058	  -0.00063	  -0.00044	  -0.00020	  -0.00036	  -0.00192
                     60	    0.00004	    0.00007	    0.00005	    0.00002	    0.00000	  -0.00002	  -0.00039	  -0.00016	  -0.00040
            </tableData>
          </table>
       </product>
    </function>
    <function name="aero/c/CMMQ">
    <description>PITCH DAMPING DERIVATIVE</description>
    <product>
          <property>aero/qb</property>
          <table>
            <independentVar lookup="row">aero/alpha-deg</independentVar>
            <tableData>
                    -10		 -29.26136
                     -5		 -27.89075
                     -2		 -28.27582
                      0		 -30.83367
                      1		 -31.40226
                      2		 -31.95774
                      3		 -32.50050
                      4		 -33.05025
                      5		 -34.23992
                      6		 -35.04427
                      7		 -34.88950
                      8		 -34.12936
                      9		 -32.81530
                     10		 -31.49575
                     11		 -30.66551
                     12		 -28.39296
                     13		 -26.35489
                     14		 -24.05064
                     15		 -21.24116
                     16		 -18.33460
                     17		 -15.31906
                     18		 -12.02058
                     19		  -8.66223
                     20		  -8.08253
                     30		    3.20129
                     60		    3.60045
            </tableData>
          </table>
       </product>
    </function>
    <function name="aero/c/CML1">
    <description>BASE ROLLING MOMENT</description>
    <product>
          <table>
            <independentVar lookup="row">aero/alpha-deg</independentVar>
            <independentVar lookup="column">aero/beta-deg</independentVar>
            <tableData>
                                -20	        -10	         -5	         -2	          0	          2	          5	         10	         20
                    -10	  -0.01740	  -0.00783	  -0.00356	  -0.00134	    0.00000	    0.00134	    0.00356	    0.00783	    0.01735
                     -5	  -0.03386	  -0.01667	  -0.00808	  -0.00316	    0.00000	    0.00316	    0.00808	    0.01667	    0.03385
                     -2	  -0.04250	  -0.02110	  -0.01033	  -0.00406	    0.00000	    0.00416	    0.01033	    0.02110	    0.04250
                      0	  -0.04885	  -0.02434	  -0.01197	  -0.00473	    0.00000	    0.00473	    0.01197	    0.02434	    0.04885
                      1	  -0.05254	  -0.02631	  -0.01298	  -0.00513	    0.00000	    0.00513	    0.01298	    0.02631	    0.05254
                      2	  -0.05653	  -0.02849	  -0.01410	  -0.00558	    0.00000	    0.00558	    0.01410	    0.02849	    0.05653
                      3	  -0.06074	  -0.03077	  -0.01527	  -0.00605	    0.00000	    0.00605	    0.01527	    0.03077	    0.06074
                      4	  -0.06513	  -0.03316	  -0.01650	  -0.00655	    0.00000	    0.00655	    0.01650	    0.03316	    0.06513
                      5	  -0.06977	  -0.03569	  -0.01778	  -0.00706	  -0.00015	    0.00706	    0.01778	    0.03569	    0.06977
                      6	  -0.07447	  -0.03825	  -0.01909	  -0.00759	    0.00000	    0.00759	    0.01909	    0.03825	    0.07444
                      7	  -0.07907	  -0.04084	  -0.02044	  -0.00813	    0.00000	    0.00813	    0.02044	    0.04084	    0.07903
                      8	  -0.08314	  -0.04358	  -0.02184	  -0.00872	    0.00000	    0.00872	    0.02184	    0.04358	    0.08309
                      9	  -0.08327	  -0.04571	  -0.02329	  -0.00931	    0.00000	    0.00931	    0.02329	    0.04571	    0.08322
                     10	  -0.07998	  -0.04342	  -0.02318	  -0.00978	    0.00000	    0.00978	    0.02350	    0.04342	    0.07998
                     11	  -0.07561	  -0.03726	  -0.01866	  -0.00745	    0.00000	    0.00745	    0.01866	    0.03726	    0.07560
                     12	  -0.07061	  -0.03010	  -0.01147	  -0.00373	    0.00000	    0.00407	    0.01147	    0.03010	    0.07060
                     13	  -0.06506	  -0.02227	  -0.00754	  -0.00306	    0.00000	    0.00303	    0.00754	    0.02227	    0.06506
                     14	  -0.05904	  -0.01635	  -0.00669	  -0.00297	    0.00000	    0.00260	    0.00669	    0.01635	    0.05904
                     15	  -0.05253	  -0.01397	  -0.00635	  -0.00244	    0.00000	    0.00244	    0.00635	    0.01397	    0.05253
                     16	  -0.04583	  -0.01332	  -0.00626	  -0.00244	    0.00000	    0.00244	    0.00626	    0.01332	    0.04583
                     17	  -0.03875	  -0.01302	  -0.00613	  -0.00238	    0.00000	    0.00244	    0.00613	    0.01302	    0.03875
                     18	  -0.03267	  -0.01297	  -0.00609	  -0.00241	    0.00000	    0.00247	    0.00616	    0.01298	    0.03267
                     19	  -0.02973	  -0.01312	  -0.00628	  -0.00248	    0.00000	    0.00240	    0.00635	    0.01312	    0.02973
                     20	  -0.02815	  -0.01330	  -0.00649	  -0.00254	    0.00000	    0.00316	    0.00649	    0.01330	    0.02815
                     30	  -0.02450	  -0.01099	  -0.00538	  -0.00215	    0.00000	    0.00215	    0.00538	    0.01099	    0.02450
                     60	  -0.03744	  -0.01764	  -0.00869	  -0.00346	    0.00000	    0.00346	    0.00869	    0.01765	    0.03744
            </tableData>
          </table>
       </product>
    </function>
    <function name="aero/c/CMLBETADOT">
    <description>ROLL MOMENT DERIVATIVE FOR BETA DOT</description>
    <product>
          <property>aero/betadot-rad_sec</property>
          <table>
            <independentVar lookup="row">aero/alpha-deg</independentVar>
            <tableData>
                    -10		  -0.04646
                     -5		  -0.09505
                     -2		  -0.08402
                      0		  -0.14717
                      1		  -0.15547
                      2		  -0.16568
                      3		  -0.17736
                      4		  -0.18979
                      5		  -0.20265
                      6		  -0.21803
                      7		  -0.23361
                      8		  -0.25024
                      9		  -0.26684
                     10		  -0.28524
                     11		  -0.25450
                     12		  -0.13013
                     13		  -0.08306
                     14		  -0.07793
                     15		  -0.07328
                     16		  -0.07305
                     17		  -0.07099
                     18		  -0.07279
                     19		  -0.07395
                     20		  -0.07157
                     30		  -0.05557
                     60		  -0.10103
            </tableData>
          </table>
       </product>
    </function>
    <function name="aero/c/CMLDAD">
    <description>ROLLING MOMENT DUE TO AILERON DEFLECTION</description>
    <product>
          <property>fcs/roll-pos-deg</property>
          <table>
            <independentVar lookup="row">aero/alpha-deg</independentVar>
            <independentVar lookup="column">aero/beta-deg</independentVar>
            <tableData>
                                -20	        -10	         -5	         -2	          0	          2	          5	         10	         20
                    -10	    0.00238	    0.00230	    0.00224	    0.00220	    0.00217	    0.00214	    0.00210	    0.00203	    0.00190
                     -5	    0.00244	    0.00271	    0.00273	    0.00272	    0.00270	    0.00269	    0.00266	    0.00260	    0.00238
                     -2	    0.00231	    0.00265	    0.00272	    0.00274	    0.00274	    0.00274	    0.00271	    0.00265	    0.00242
                      0	    0.00212	    0.00253	    0.00268	    0.00272	    0.00272	    0.00271	    0.00269	    0.00262	    0.00240
                      1	    0.00200	    0.00241	    0.00260	    0.00268	    0.00272	    0.00272	    0.00270	    0.00263	    0.00241
                      2	    0.00187	    0.00229	    0.00249	    0.00259	    0.00266	    0.00271	    0.00272	    0.00265	    0.00243
                      3	    0.00175	    0.00218	    0.00238	    0.00249	    0.00257	    0.00264	    0.00272	    0.00268	    0.00245
                      4	    0.00162	    0.00206	    0.00227	    0.00239	    0.00247	    0.00254	    0.00265	    0.00270	    0.00248
                      5	    0.00149	    0.00194	    0.00216	    0.00230	    0.00237	    0.00245	    0.00257	    0.00271	    0.00251
                      6	    0.00135	    0.00182	    0.00205	    0.00219	    0.00227	    0.00236	    0.00248	    0.00266	    0.00253
                      7	    0.00120	    0.00170	    0.00194	    0.00208	    0.00217	    0.00226	    0.00239	    0.00258	    0.00256
                      8	    0.00102	    0.00155	    0.00181	    0.00196	    0.00206	    0.00217	    0.00229	    0.00250	    0.00255
                      9	    0.00093	    0.00135	    0.00165	    0.00183	    0.00194	    0.00206	    0.00219	    0.00239	    0.00240
                     10	    0.00092	    0.00125	    0.00148	    0.00165	    0.00178	    0.00191	    0.00203	    0.00211	    0.00216
                     11	    0.00092	    0.00125	    0.00139	    0.00149	    0.00155	    0.00161	    0.00168	    0.00179	    0.00195
                     12	    0.00092	    0.00126	    0.00137	    0.00134	    0.00129	    0.00128	    0.00131	    0.00151	    0.00174
                     13	    0.00093	    0.00126	    0.00122	    0.00114	    0.00112	    0.00110	    0.00106	    0.00118	    0.00151
                     14	    0.00093	    0.00119	    0.00105	    0.00099	    0.00097	    0.00094	    0.00089	    0.00088	    0.00126
                     15	    0.00094	    0.00104	    0.00093	    0.00087	    0.00083	    0.00079	    0.00074	    0.00067	    0.00100
                     16	    0.00094	    0.00091	    0.00080	    0.00073	    0.00069	    0.00064	    0.00058	    0.00050	    0.00074
                     17	    0.00094	    0.00076	    0.00066	    0.00059	    0.00054	    0.00050	    0.00043	    0.00034	    0.00049
                     18	    0.00091	    0.00066	    0.00052	    0.00044	    0.00039	    0.00035	    0.00030	    0.00025	    0.00030
                     19	    0.00080	    0.00053	    0.00038	    0.00031	    0.00027	    0.00024	    0.00022	    0.00018	    0.00016
                     20	    0.00072	    0.00040	    0.00027	    0.00022	    0.00020	    0.00020	    0.00011	    0.00010	    0.00008
                     30	    0.00016	    0.00011	    0.00010	    0.00009	    0.00009	    0.00009	    0.00009	    0.00009	    0.00010
                     60	    0.00006	    0.00005	    0.00005	    0.00005	    0.00005	    0.00005	    0.00004	    0.00004	    0.00003
            </tableData>
          </table>
       </product>
    </function>
    <function name="aero/c/CMLDRD">
    <description>ROLLING MOMENT DUE TO RUDDER DEFLECTION</description>
    <product>
          <property>fcs/yaw-pos-deg</property>
          <table>
            <independentVar lookup="row">aero/alpha-deg</independentVar>
            <independentVar lookup="column">aero/beta-deg</independentVar>
            <tableData>
                                -20	        -10	         -5	         -2	          0	          2	          5	         10	         20
                    -10	    0.00015	    0.00047	    0.00056	    0.00054	    0.00053	    0.00053	    0.00053	    0.00056	    0.00057
                     -5	    0.00017	    0.00049	    0.00054	    0.00052	    0.00051	    0.00050	    0.00051	    0.00053	    0.00056
                     -2	    0.00019	    0.00050	    0.00053	    0.00051	    0.00049	    0.00049	    0.00049	    0.00052	    0.00056
                      0	    0.00019	    0.00050	    0.00052	    0.00050	    0.00048	    0.00047	    0.00048	    0.00051	    0.00055
                      1	    0.00020	    0.00050	    0.00051	    0.00049	    0.00047	    0.00046	    0.00047	    0.00050	    0.00055
                      2	    0.00020	    0.00050	    0.00050	    0.00048	    0.00046	    0.00045	    0.00046	    0.00049	    0.00054
                      3	    0.00020	    0.00050	    0.00049	    0.00047	    0.00045	    0.00044	    0.00045	    0.00048	    0.00053
                      4	    0.00020	    0.00049	    0.00047	    0.00046	    0.00044	    0.00043	    0.00044	    0.00047	    0.00053
                      5	    0.00021	    0.00049	    0.00047	    0.00044	    0.00042	    0.00042	    0.00043	    0.00046	    0.00052
                      6	    0.00022	    0.00048	    0.00045	    0.00043	    0.00042	    0.00041	    0.00042	    0.00044	    0.00052
                      7	    0.00022	    0.00047	    0.00044	    0.00041	    0.00040	    0.00040	    0.00041	    0.00044	    0.00051
                      8	    0.00022	    0.00046	    0.00042	    0.00040	    0.00039	    0.00038	    0.00039	    0.00043	    0.00049
                      9	    0.00022	    0.00044	    0.00041	    0.00039	    0.00037	    0.00037	    0.00038	    0.00041	    0.00048
                     10	    0.00022	    0.00043	    0.00041	    0.00037	    0.00036	    0.00035	    0.00036	    0.00040	    0.00048
                     11	    0.00022	    0.00042	    0.00038	    0.00036	    0.00035	    0.00035	    0.00036	    0.00039	    0.00046
                     12	    0.00022	    0.00041	    0.00038	    0.00036	    0.00035	    0.00036	    0.00035	    0.00038	    0.00045
                     13	    0.00022	    0.00039	    0.00037	    0.00034	    0.00034	    0.00036	    0.00035	    0.00037	    0.00044
                     14	    0.00023	    0.00039	    0.00036	    0.00033	    0.00034	    0.00033	    0.00034	    0.00037	    0.00043
                     15	    0.00023	    0.00038	    0.00035	    0.00034	    0.00033	    0.00032	    0.00034	    0.00037	    0.00042
                     16	    0.00023	    0.00037	    0.00034	    0.00033	    0.00032	    0.00032	    0.00033	    0.00036	    0.00041
                     17	    0.00023	    0.00036	    0.00033	    0.00032	    0.00031	    0.00031	    0.00032	    0.00035	    0.00040
                     18	    0.00024	    0.00035	    0.00032	    0.00031	    0.00030	    0.00030	    0.00031	    0.00033	    0.00039
                     19	    0.00025	    0.00033	    0.00031	    0.00029	    0.00028	    0.00028	    0.00029	    0.00033	    0.00039
                     20	    0.00025	    0.00033	    0.00029	    0.00028	    0.00027	    0.00030	    0.00029	    0.00033	    0.00038
                     30	    0.00025	    0.00025	    0.00025	    0.00025	    0.00024	    0.00024	    0.00025	    0.00026	    0.00029
                     60	    0.00000	    0.00001	    0.00001	    0.00001	    0.00001	    0.00001	    0.00004	    0.00002	    0.00003
            </tableData>
          </table>
       </product>
    </function>
    <function name="aero/c/CMLP">
    <description>ROLL DAMPING DERIVATIVE</description>
    <product>
          <property>aero/pb</property>
          <table>
            <independentVar lookup="row">aero/alpha-deg</independentVar>
            <tableData>
                    -10		  -0.45404
                     -5		  -0.41591
                     -2		  -0.38741
                      0		  -0.39520
                      1		  -0.40313
                      2		  -0.41124
                      3		  -0.42005
                      4		  -0.42997
                      5		  -0.45211
                      6		  -0.45746
                      7		  -0.44616
                      8		  -0.42643
                      9		  -0.39880
                     10		  -0.34522
                     11		  -0.29454
                     12		  -0.25046
                     13		  -0.20410
                     14		  -0.15469
                     15		  -0.10733
                     16		  -0.06881
                     17		  -0.03866
                     18		  -0.01557
                     19		    0.00309
                     20		    0.01725
                     30		    0.03871
                     60		    0.04097
            </tableData>
          </table>
       </product>
    </function>
    <function name="aero/c/CMLR">
    <description>ROLLING MOMENT DUE TO YAW RATE</description>
    <product>
          <property>aero/rb</property>
          <table>
            <independentVar lookup="row">aero/alpha-deg</independentVar>
            <tableData>
                    -10		  -0.00480
                     -5		    0.05595
                     -2		    0.07624
                      0		    0.09275
                      1		    0.10295
                      2		    0.11379
                      3		    0.12498
                      4		    0.13841
                      5		    0.15441
                      6		    0.16701
                      7		    0.18011
                      8		    0.19378
                      9		    0.20995
                     10		    0.21248
                     11		    0.18304
                     12		    0.14231
                     13		    0.10506
                     14		    0.08659
                     15		    0.07827
                     16		    0.07568
                     17		    0.07654
                     18		    0.07698
                     19		    0.07614
                     20		    0.07516
                     30		    0.08345
                     60		    0.11904
            </tableData>
          </table>
       </product>
    </function>
    <function name="aero/c/CFYB">
    <description>BASE SIDEFORCE</description>
    <product>
          <table>
            <independentVar lookup="row">aero/alpha-deg</independentVar>
            <independentVar lookup="column">aero/beta-deg</independentVar>
            <independentVar lookup="table">fcs/pitch-pos-deg</independentVar>
              <tableData breakPoint="-17">
                              -20	       -10	        -5	        -2	         0	         2	         5	        10	        20
                    -10	    0.16391	    0.07516	    0.03549	    0.01370	    0.00000	  -0.01370	  -0.03549	  -0.07516	  -0.16391
                     -5	    0.16888	    0.07687	    0.03622	    0.01401	    0.00000	  -0.01401	  -0.03621	  -0.07687	  -0.16888
                     -2	    0.17144	    0.07824	    0.03701	    0.01455	    0.00000	  -0.01455	  -0.03701	  -0.07824	  -0.17145
                      0	    0.17291	    0.07879	    0.03733	    0.01475	    0.00000	  -0.01474	  -0.03733	  -0.07879	  -0.17286
                      1	    0.17352	    0.07904	    0.03746	    0.01469	    0.00000	  -0.01469	  -0.03746	  -0.07904	  -0.17347
                      2	    0.17403	    0.07922	    0.03758	    0.01465	    0.00000	  -0.01465	  -0.03757	  -0.07922	  -0.17403
                      3	    0.17434	    0.07928	    0.03768	    0.01467	    0.00000	  -0.01467	  -0.03768	  -0.07928	  -0.17434
                      4	    0.17438	    0.07926	    0.03776	    0.01476	    0.00000	  -0.01476	  -0.03776	  -0.07917	  -0.17438
                      5	    0.17410	    0.07911	    0.03783	    0.01480	    0.00000	  -0.01480	  -0.03783	  -0.07901	  -0.17347
                      6	    0.17357	    0.07897	    0.03774	    0.01475	  -0.00001	  -0.01370	  -0.03774	  -0.07897	  -0.17327
                      7	    0.17182	    0.07833	    0.03745	    0.01525	    0.00000	  -0.01463	  -0.03745	  -0.07833	  -0.17181
                      8	    0.17075	    0.07793	    0.03720	    0.01507	    0.00000	  -0.01444	  -0.03722	  -0.07793	  -0.17068
                      9	    0.16918	    0.07726	    0.03681	    0.01423	    0.00000	  -0.01423	  -0.03681	  -0.07726	  -0.16893
                     10	    0.16722	    0.07595	    0.03618	    0.01401	    0.00000	  -0.01401	  -0.03618	  -0.07595	  -0.16709
                     11	    0.16557	    0.07517	    0.03564	    0.01377	    0.00000	  -0.01377	  -0.03564	  -0.07517	  -0.16566
                     12	    0.16423	    0.07487	    0.03552	    0.01374	    0.00000	  -0.01374	  -0.03552	  -0.07487	  -0.16430
                     13	    0.16331	    0.07511	    0.03583	    0.01385	    0.00000	  -0.01385	  -0.03583	  -0.07511	  -0.16334
                     14	    0.16297	    0.07577	    0.03596	    0.01377	    0.00000	  -0.01377	  -0.03596	  -0.07577	  -0.16284
                     15	    0.16258	    0.07631	    0.03591	    0.01370	    0.00000	  -0.01369	  -0.03591	  -0.07631	  -0.16226
                     16	    0.16338	    0.07634	    0.03568	    0.01351	    0.00000	  -0.01351	  -0.03568	  -0.07634	  -0.16338
                     17	    0.16496	    0.07737	    0.03556	    0.01335	    0.00000	  -0.01335	  -0.03556	  -0.07788	  -0.16492
                     18	    0.16676	    0.07908	    0.03668	    0.01339	    0.00000	  -0.01374	  -0.03668	  -0.07908	  -0.16672
                     19	    0.16761	    0.08068	    0.03838	    0.01440	    0.00000	  -0.01440	  -0.03838	  -0.08066	  -0.16784
                     20	    0.16773	    0.08189	    0.03879	    0.01424	    0.00000	  -0.01424	  -0.03879	  -0.08189	  -0.16773
                     30	    0.13879	    0.05813	    0.02798	    0.01124	    0.00000	  -0.01124	  -0.02813	  -0.05813	  -0.14231
                     60	    0.06526	    0.02822	    0.01323	  -0.00105	    0.00000	  -0.00514	  -0.01323	  -0.02822	  -0.06526
              </tableData>
              <tableData breakPoint="-15">
                              -20	       -10	        -5	        -2	         0	         2	         5	        10	        20
                    -10	    0.16339	    0.07450	    0.03477	    0.01339	    0.00000	  -0.01339	  -0.03477	  -0.07450	  -0.16339
                      2	    0.17429	    0.07938	    0.03759	    0.01461	    0.00000	  -0.01461	  -0.03759	  -0.07938	  -0.17429
                      7	    0.17200	    0.07854	    0.03749	    0.01462	    0.00000	  -0.01462	  -0.03749	  -0.07854	  -0.17200
                     12	    0.16476	    0.07502	    0.03560	    0.01375	    0.00000	  -0.01378	  -0.03560	  -0.07502	  -0.16421
                     17	    0.16470	    0.07725	    0.03552	    0.01331	    0.00000	  -0.01333	  -0.03506	  -0.07727	  -0.16470
                     60	    0.06502	    0.02811	    0.01318	    0.00512	    0.00000	  -0.01144	  -0.01318	  -0.02811	  -0.05905
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              </tableData>
              <tableData breakPoint="-10">
                              -20	       -10	        -5	        -2	         0	         2	         5	        10	        20
                    -10	    0.16209	    0.07350	    0.03429	    0.01315	    0.00000	  -0.01315	  -0.03429	  -0.07350	  -0.16209
                      2	    0.17485	    0.07975	    0.03764	    0.01453	    0.00000	  -0.01453	  -0.03764	  -0.07975	  -0.17485
                      7	    0.17239	    0.07904	    0.03760	    0.01463	    0.00000	  -0.01463	  -0.03760	  -0.07904	  -0.17232
                     12	    0.16412	    0.07536	    0.03580	    0.01386	    0.00000	  -0.01387	  -0.03580	  -0.07536	  -0.16412
                     17	    0.16390	    0.07694	    0.03538	    0.01328	    0.00000	  -0.01328	  -0.03538	  -0.07694	  -0.16390
                     60	    0.05729	    0.02784	    0.01305	    0.00507	    0.00000	  -0.00509	  -0.01305	  -0.02784	  -0.06447
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              </tableData>
              <tableData breakPoint="-5">
                              -20	       -10	        -5	        -2	         0	         2	         5	        10	        20
                    -10	    0.16325	    0.07449	    0.03476	    0.01333	    0.00000	  -0.01333	  -0.03476	  -0.07449	  -0.16318
                      2	    0.17521	    0.08009	    0.03771	    0.01449	    0.00000	  -0.01449	  -0.03771	  -0.08009	  -0.17520
                      7	    0.17252	    0.07946	    0.03772	    0.01464	    0.00000	  -0.01464	  -0.03772	  -0.07946	  -0.17253
                     12	    0.16384	    0.07563	    0.03596	    0.01394	    0.00000	  -0.01394	  -0.03596	  -0.07563	  -0.16384
                     17	    0.16288	    0.07651	    0.03518	    0.01320	    0.00000	  -0.01320	  -0.03518	  -0.07651	  -0.16286
                     60	    0.06398	    0.02761	    0.01294	    0.00503	    0.00000	  -0.00503	  -0.01294	  -0.02761	  -0.06398
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              </tableData>
              <tableData breakPoint="0">
                              -20	       -10	        -5	        -2	         0	         2	         5	        10	        20
                    -10	    0.16473	    0.07540	    0.03519	    0.01349	    0.00000	  -0.01349	  -0.03519	  -0.07540	  -0.16473
                      2	    0.17532	    0.08033	    0.03780	    0.01450	    0.00000	  -0.01450	  -0.03780	  -0.08033	  -0.17529
                      7	    0.17249	    0.07983	    0.03780	    0.01466	    0.00000	  -0.01466	  -0.03780	  -0.07983	  -0.17249
                     12	    0.16338	    0.07577	    0.03609	    0.01401	    0.00000	  -0.01400	  -0.03609	  -0.07580	  -0.16338
                     17	    0.16162	    0.07595	    0.03489	    0.01310	    0.00000	  -0.01310	  -0.03492	  -0.07598	  -0.16162
                     60	    0.06358	    0.02741	    0.01285	    0.00497	    0.00000	  -0.00506	  -0.01285	  -0.02741	  -0.06357
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              </tableData>
              <tableData breakPoint="5">
                              -20	       -10	        -5	        -2	         0	         2	         5	        10	        20
                    -10	    0.16601	    0.07618	    0.03558	    0.01365	    0.00000	  -0.01365	  -0.03562	  -0.07618	  -0.16601
                      2	    0.17514	    0.08049	    0.03791	    0.01514	    0.00000	  -0.01451	  -0.03791	  -0.08049	  -0.17514
                      7	    0.17227	    0.08010	    0.03786	    0.01467	    0.00000	  -0.01467	  -0.03786	  -0.08010	  -0.17227
                     12	    0.16271	    0.07586	    0.03617	    0.01404	    0.00000	  -0.01404	  -0.03617	  -0.07586	  -0.16271
                     17	    0.16086	    0.07555	    0.03446	    0.01298	    0.00000	  -0.01298	  -0.03465	  -0.07555	  -0.16102
                     60	    0.06327	    0.02725	    0.01277	    0.00496	    0.00000	  -0.00496	  -0.01277	  -0.02725	  -0.06326
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              </tableData>
              <tableData breakPoint="10">
                              -20	       -10	        -5	        -2	         0	         2	         5	        10	        20
                    -10	    0.16700	    0.07684	    0.03591	    0.01377	    0.00000	  -0.01377	  -0.03591	  -0.07672	  -0.16700
                      2	    0.17480	    0.08060	    0.03805	    0.01467	    0.00000	  -0.01467	  -0.03805	  -0.08060	  -0.17480
                      7	    0.17186	    0.08029	    0.03791	    0.01466	    0.00000	  -0.01466	  -0.03791	  -0.08029	  -0.17186
                     12	    0.16196	    0.07584	    0.03619	    0.01406	    0.00000	  -0.01406	  -0.03619	  -0.07585	  -0.16196
                     17	    0.16018	    0.07556	    0.03494	    0.01319	    0.00000	  -0.01319	  -0.03494	  -0.07557	  -0.16018
                     60	    0.06305	    0.02714	    0.01272	    0.00494	    0.00000	  -0.00494	  -0.01272	  -0.02714	  -0.06305
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              </tableData>
              <tableData breakPoint="15">
                              -20	       -10	        -5	        -2	         0	         2	         5	        10	        20
                    -10	    0.16772	    0.07739	    0.03620	    0.01389	    0.00000	  -0.01389	  -0.03620	  -0.07739	  -0.16772
                      2	    0.17424	    0.08067	    0.03821	    0.01482	    0.00000	  -0.01482	  -0.03821	  -0.08067	  -0.17429
                      7	    0.17131	    0.08038	    0.03792	    0.01470	    0.00000	  -0.01251	  -0.03792	  -0.08038	  -0.17131
                     12	    0.16132	    0.07584	    0.03627	    0.01413	    0.00000	  -0.01414	  -0.03627	  -0.07584	  -0.16121
                     17	    0.15946	    0.07538	    0.03474	    0.01303	    0.00000	  -0.01303	  -0.03474	  -0.07538	  -0.15947
                     60	    0.06280	    0.02708	    0.01269	    0.00493	    0.00000	  -0.00493	  -0.01269	  -0.02708	  -0.06303
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              </tableData>
              <tableData breakPoint="20">
                              -20	       -10	        -5	        -2	         0	         2	         5	        10	        20
                    -10	    0.16821	    0.07781	    0.03644	    0.01399	    0.00000	  -0.01333	  -0.03644	  -0.07781	  -0.16821
                      2	    0.17368	    0.08069	    0.03837	    0.01499	    0.00000	  -0.01499	  -0.03837	  -0.08069	  -0.17365
                      7	    0.17048	    0.08026	    0.03786	    0.01487	    0.00000	  -0.01468	  -0.03788	  -0.08026	  -0.17048
                     12	    0.16027	    0.07559	    0.03612	    0.01405	    0.00000	  -0.01405	  -0.03612	  -0.07552	  -0.16027
                     17	    0.15842	    0.07480	    0.03442	    0.01289	  -0.00399	  -0.01289	  -0.03442	  -0.07484	  -0.15863
                     60	    0.06290	    0.02706	    0.01269	    0.00493	    0.00000	  -0.00493	  -0.01269	  -0.02706	  -0.06290
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              </tableData>
              <tableData breakPoint="25">
                              -20	       -10	        -5	        -2	         0	         2	         5	        10	        20
                    -10	    0.16852	    0.07812	    0.03663	    0.01407	    0.00000	  -0.01407	  -0.03663	  -0.07812	  -0.16852
                      2	    0.17280	    0.08054	    0.03851	    0.01517	    0.00000	  -0.01517	  -0.03851	  -0.08054	  -0.17280
                      7	    0.16945	    0.07978	    0.03740	    0.01444	    0.00000	  -0.01444	  -0.03740	  -0.07978	  -0.16944
                     12	    0.15926	    0.07512	    0.03592	    0.01397	    0.00000	  -0.01397	  -0.03592	  -0.07512	  -0.15926
                     17	    0.15796	    0.07431	    0.03421	    0.01283	    0.00000	  -0.01283	  -0.03421	  -0.08323	  -0.15781
                     60	    0.06522	    0.02707	    0.01269	    0.00493	    0.00000	  -0.00498	  -0.01269	  -0.02707	  -0.06293
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              </tableData>
              <tableData breakPoint="30">
                              -20	       -10	        -5	        -2	         0	         2	         5	        10	        20
                    -10	    0.16866	    0.07833	    0.03677	    0.01414	    0.00000	  -0.01414	  -0.03677	  -0.07833	  -0.16866
                      2	    0.17160	    0.07984	    0.03807	    0.01499	    0.00000	  -0.01254	  -0.03807	  -0.07984	  -0.17160
                      7	    0.16809	    0.07899	    0.03706	    0.01429	    0.00000	  -0.01429	  -0.03706	  -0.07899	  -0.16830
                     12	    0.15831	    0.07491	    0.03586	    0.01396	    0.00000	  -0.01396	  -0.03586	  -0.07906	  -0.15831
                     17	    0.16275	    0.07389	    0.03407	    0.01311	    0.00000	  -0.01277	  -0.03407	  -0.07403	  -0.15789
                     60	    0.06301	    0.02710	    0.01271	    0.00494	    0.00000	  -0.00494	  -0.01271	  -0.02710	  -0.06301
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              </tableData>
          </table>
       </product>
    </function>
    <function name="aero/c/CFYP">
    <description>SIDE FORCE DUE TO ROLL RATE</description>
    <product>
          <property>aero/pb</property>
          <table>
            <independentVar lookup="row">aero/alpha-deg</independentVar>
            <tableData>
                    -10		  -0.45801
                     -5		  -0.32961
                      2		  -0.17096
                      6		  -0.06551
                     10		    0.02109
                     14		    0.04727
                     18		    0.02792
                     60		  -0.08798
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            </tableData>
          </table>
       </product>
    </function>
    <function name="aero/c/CFYR">
    <description>SIDE FORCE DUE TO YAW RATE</description>
    <product>
          <property>aero/rb</property>
          <table>
            <independentVar lookup="row">aero/alpha-deg</independentVar>
            <tableData>
                    -10		    0.46051
                     -5		    0.45008
                      2		    0.46388
                      6		    0.50176
                     10		    0.48580
                     14		    0.49328
                     18		    0.47289
                     60		    0.31268
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            </tableData>
          </table>
       </product>
    </function>
    <function name="aero/c/CYDAD">
    <description>SIDE FORCE DUE TO AILERON DEFLECTION</description>
    <product>
          <property>fcs/roll-pos-deg</property>
          <table>
            <independentVar lookup="row">aero/alpha-deg</independentVar>
            <independentVar lookup="column">aero/beta-deg</independentVar>
            <tableData>
                                -20	        -10	         -5	         -2	          0	          2	          5	         10	         20
                    -10	  -0.00065	  -0.00063	  -0.00064	  -0.00064	  -0.00064	  -0.00062	  -0.00060	  -0.00057	  -0.00055
                      2	  -0.00035	  -0.00055	  -0.00064	  -0.00068	  -0.00070	  -0.00069	  -0.00068	  -0.00064	  -0.00053
                      7	  -0.00025	  -0.00045	  -0.00052	  -0.00055	  -0.00056	  -0.00057	  -0.00057	  -0.00057	  -0.00045
                     12	  -0.00028	  -0.00044	  -0.00050	  -0.00053	  -0.00055	  -0.00055	  -0.00056	  -0.00054	  -0.00040
                     17	  -0.00034	  -0.00045	  -0.00069	  -0.00067	  -0.00069	  -0.00072	  -0.00074	  -0.00069	  -0.00068
                     60	  -0.00026	  -0.00025	  -0.00024	  -0.00024	  -0.00028	  -0.00024	  -0.00024	  -0.00024	  -0.00024
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            </tableData>
          </table>
       </product>
    </function>
    <function name="aero/c/CYDRD">
    <description>SIDE FORCE DUE TO RUDDER DEFLECTION</description>
    <product>
          <property>fcs/yaw-pos-deg</property>
          <table>
            <independentVar lookup="row">aero/alpha-deg</independentVar>
            <independentVar lookup="column">aero/beta-deg</independentVar>
            <tableData>
                                -20	        -10	         -5	         -2	          0	          2	          5	         10	         20
                    -10	    0.00178	    0.00380	    0.00423	    0.00414	    0.00407	    0.00403	    0.00408	    0.00429	    0.00451
                      2	    0.00210	    0.00399	    0.00396	    0.00385	    0.00373	    0.00367	    0.00375	    0.00398	    0.00434
                      7	    0.00219	    0.00383	    0.00372	    0.00362	    0.00357	    0.00353	    0.00358	    0.00378	    0.00412
                     12	    0.00226	    0.00353	    0.00342	    0.00333	    0.00327	    0.00328	    0.00332	    0.00351	    0.00387
                     17	    0.00231	    0.00311	    0.00298	    0.00283	    0.00270	    0.00273	    0.00289	    0.00313	    0.00352
                     60	    0.00003	    0.00011	    0.00014	    0.00015	    0.00016	    0.00018	    0.00023	    0.00024	    0.00031
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            </tableData>
          </table>
       </product>
    </function>
    <function name="aero/c/CMN1">
    <description>BASE YAWING MOMENT</description>
    <product>
          <table>
            <independentVar lookup="row">aero/alpha-deg</independentVar>
            <independentVar lookup="column">aero/beta-deg</independentVar>
            <independentVar lookup="table">fcs/pitch-pos-deg</independentVar>
              <tableData breakPoint="-17">
                              -20	       -10	        -5	        -2	         0	         2	         5	        10	        20
                    -10	  -0.08018	  -0.03844	  -0.01844	  -0.00718	    0.00000	    0.00718	    0.01844	    0.03844	    0.08018
                      2	  -0.07222	  -0.03327	  -0.01572	  -0.00610	    0.00000	    0.00610	    0.01572	    0.03327	    0.07222
                      7	  -0.07092	  -0.03164	  -0.01469	  -0.00581	    0.00000	    0.00560	    0.01469	    0.03164	    0.07091
                     12	  -0.06918	  -0.03259	  -0.01591	  -0.00626	    0.00000	    0.00626	    0.01591	    0.03259	    0.06921
                     17	  -0.07666	  -0.03768	  -0.01790	  -0.00693	    0.00000	    0.00693	    0.01790	    0.03790	    0.07664
                     60	  -0.04875	  -0.02321	  -0.01133	  -0.00171	    0.00000	    0.00447	    0.01133	    0.02321	    0.04875
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              </tableData>
              <tableData breakPoint="-15">
                              -20	       -10	        -5	        -2	         0	         2	         5	        10	        20
                    -10	  -0.07963	  -0.03790	  -0.01794	  -0.00696	    0.00000	    0.00696	    0.01794	    0.03790	    0.07963
                      2	  -0.07225	  -0.03327	  -0.01568	  -0.00607	    0.00000	    0.00607	    0.01568	    0.03327	    0.07225
                      7	  -0.07097	  -0.03166	  -0.01468	  -0.00559	    0.00000	    0.00559	    0.01468	    0.03166	    0.07097
                     12	  -0.06947	  -0.03266	  -0.01595	  -0.00627	    0.00000	    0.00628	    0.01595	    0.03266	    0.06923
                     17	  -0.07670	  -0.03770	  -0.01791	  -0.00692	    0.00000	    0.00693	    0.01771	    0.03771	    0.07670
                     60	  -0.04877	  -0.02322	  -0.01133	  -0.00447	    0.00000	    0.00730	    0.01133	    0.02322	    0.04614
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              </tableData>
              <tableData breakPoint="-10">
                              -20	       -10	        -5	        -2	         0	         2	         5	        10	        20
                    -10	  -0.07823	  -0.03687	  -0.01740	  -0.00671	    0.00000	    0.00671	    0.01740	    0.03687	    0.07823
                      2	  -0.07237	  -0.03330	  -0.01563	  -0.00600	    0.00000	    0.00600	    0.01563	    0.03330	    0.07237
                      7	  -0.07118	  -0.03175	  -0.01469	  -0.00558	    0.00000	    0.00558	    0.01469	    0.03175	    0.07115
                     12	  -0.06947	  -0.03287	  -0.01608	  -0.00633	    0.00000	    0.00633	    0.01608	    0.03287	    0.06947
                     17	  -0.07688	  -0.03781	  -0.01796	  -0.00695	    0.00000	    0.00695	    0.01795	    0.03781	    0.07688
                     60	  -0.04564	  -0.02326	  -0.01135	  -0.00448	    0.00000	    0.00448	    0.01135	    0.02326	    0.04882
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              </tableData>
              <tableData breakPoint="-5">
                              -20	       -10	        -5	        -2	         0	         2	         5	        10	        20
                    -10	  -0.07813	  -0.03697	  -0.01743	  -0.00671	    0.00000	    0.00671	    0.01743	    0.03697	    0.07809
                      2	  -0.07254	  -0.03339	  -0.01563	  -0.00597	    0.00000	    0.00597	    0.01563	    0.03339	    0.07254
                      7	  -0.07144	  -0.03189	  -0.01474	  -0.00559	    0.00000	    0.00559	    0.01474	    0.03189	    0.07144
                     12	  -0.06979	  -0.03314	  -0.01624	  -0.00641	    0.00000	    0.00641	    0.01624	    0.03314	    0.06979
                     17	  -0.07715	  -0.03796	  -0.01802	  -0.00698	    0.00000	    0.00698	    0.01802	    0.03796	    0.07713
                     60	  -0.04889	  -0.02329	  -0.01137	  -0.00449	    0.00000	    0.00449	    0.01137	    0.02329	    0.04889
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              </tableData>
              <tableData breakPoint="0">
                              -20	       -10	        -5	        -2	         0	         2	         5	        10	        20
                    -10	  -0.07836	  -0.03713	  -0.01750	  -0.00674	    0.00000	    0.00674	    0.01750	    0.03713	    0.07836
                      2	  -0.07278	  -0.03354	  -0.01570	  -0.00599	    0.00000	    0.00599	    0.01570	    0.03354	    0.07277
                      7	  -0.07179	  -0.03211	  -0.01483	  -0.00562	    0.00000	    0.00562	    0.01483	    0.03211	    0.07179
                     12	  -0.07021	  -0.03346	  -0.01644	  -0.00650	    0.00000	    0.00649	    0.01644	    0.03347	    0.07021
                     17	  -0.07748	  -0.03815	  -0.01810	  -0.00701	    0.00000	    0.00701	    0.01812	    0.03817	    0.07748
                     60	  -0.04896	  -0.02333	  -0.01139	  -0.00450	    0.00000	    0.00453	    0.01139	    0.02333	    0.04895
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              </tableData>
              <tableData breakPoint="5">
                              -20	       -10	        -5	        -2	         0	         2	         5	        10	        20
                    -10	  -0.07869	  -0.03732	  -0.01759	  -0.00677	    0.00000	    0.00677	    0.01761	    0.03732	    0.07869
                      2	  -0.07305	  -0.03374	  -0.01582	  -0.00632	    0.00000	    0.00603	    0.01582	    0.03374	    0.07305
                      7	  -0.07222	  -0.03237	  -0.01496	  -0.00566	    0.00000	    0.00566	    0.01496	    0.03237	    0.07222
                     12	  -0.07070	  -0.03384	  -0.01666	  -0.00658	    0.00000	    0.00658	    0.01666	    0.03384	    0.07070
                     17	  -0.07827	  -0.03856	  -0.01818	  -0.00706	    0.00000	    0.00706	    0.01826	    0.03856	    0.07832
                     60	  -0.04903	  -0.02337	  -0.01141	  -0.00450	    0.00000	    0.00450	    0.01141	    0.02337	    0.04903
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              </tableData>
              <tableData breakPoint="10">
                              -20	       -10	        -5	        -2	         0	         2	         5	        10	        20
                    -10	  -0.07904	  -0.03756	  -0.01771	  -0.00682	    0.00000	    0.00682	    0.01771	    0.03751	    0.07904
                      2	  -0.07339	  -0.03401	  -0.01600	  -0.00616	    0.00000	    0.00616	    0.01600	    0.03401	    0.07340
                      7	  -0.07272	  -0.03268	  -0.01512	  -0.00572	    0.00000	    0.00572	    0.01512	    0.03268	    0.07272
                     12	  -0.07130	  -0.03426	  -0.01689	  -0.00668	    0.00000	    0.00668	    0.01689	    0.03426	    0.07130
                     17	  -0.07915	  -0.03936	  -0.01890	  -0.00739	    0.00000	    0.00739	    0.01890	    0.03937	    0.07915
                     60	  -0.04911	  -0.02341	  -0.01143	  -0.00451	    0.00000	    0.00451	    0.01143	    0.02341	    0.04910
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              </tableData>
              <tableData breakPoint="15">
                              -20	       -10	        -5	        -2	         0	         2	         5	        10	        20
                    -10	  -0.07944	  -0.03784	  -0.01785	  -0.00687	    0.00000	    0.00687	    0.01785	    0.03784	    0.07944
                      2	  -0.07377	  -0.03434	  -0.01624	  -0.00630	    0.00000	    0.00630	    0.01624	    0.03434	    0.07380
                      7	  -0.07327	  -0.03302	  -0.01531	  -0.00581	    0.00000	    0.00485	    0.01531	    0.03302	    0.07327
                     12	  -0.07200	  -0.03480	  -0.01725	  -0.00685	    0.00000	    0.00685	    0.01725	    0.03480	    0.07195
                     17	  -0.07992	  -0.04004	  -0.01915	  -0.00743	    0.00000	    0.00743	    0.01915	    0.04004	    0.07992
                     60	  -0.04911	  -0.02345	  -0.01145	  -0.00452	    0.00000	    0.00452	    0.01145	    0.02345	    0.04924
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              </tableData>
              <tableData breakPoint="20">
                              -20	       -10	        -5	        -2	         0	         2	         5	        10	        20
                    -10	  -0.07986	  -0.03813	  -0.01801	  -0.00694	    0.00000	    0.00659	    0.01801	    0.03813	    0.07986
                      2	  -0.07422	  -0.03469	  -0.01651	  -0.00647	    0.00000	    0.00647	    0.01651	    0.03469	    0.07421
                      7	  -0.07369	  -0.03331	  -0.01550	  -0.00597	    0.00000	    0.00589	    0.01550	    0.03331	    0.07369
                     12	  -0.07239	  -0.03520	  -0.01749	  -0.00693	    0.00000	    0.00693	    0.01749	    0.03516	    0.07239
                     17	  -0.08047	  -0.04016	  -0.01916	  -0.00742	    0.00197	    0.00743	    0.01916	    0.04018	    0.08052
                     60	  -0.04925	  -0.02348	  -0.01147	  -0.00453	    0.00000	    0.00453	    0.01147	    0.02348	    0.04925
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              </tableData>
              <tableData breakPoint="25">
                              -20	       -10	        -5	        -2	         0	         2	         5	        10	        20
                    -10	  -0.08029	  -0.03842	  -0.01817	  -0.00701	    0.00000	    0.00701	    0.01817	    0.03842	    0.08029
                      2	  -0.07450	  -0.03497	  -0.01676	  -0.00664	    0.00000	    0.00664	    0.01676	    0.03497	    0.07450
                      7	  -0.07391	  -0.03339	  -0.01547	  -0.00585	    0.00000	    0.00585	    0.01547	    0.03339	    0.07391
                     12	  -0.07267	  -0.03536	  -0.01754	  -0.00695	    0.00000	    0.00695	    0.01754	    0.03536	    0.07267
                     17	  -0.08095	  -0.04015	  -0.01916	  -0.00743	    0.00000	    0.00743	    0.01916	    0.04478	    0.08087
                     60	  -0.04992	  -0.02351	  -0.01149	  -0.00453	    0.00000	    0.00455	    0.01149	    0.02351	    0.04931
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              </tableData>
              <tableData breakPoint="30">
                              -20	       -10	        -5	        -2	         0	         2	         5	        10	        20
                    -10	  -0.08067	  -0.03867	  -0.01832	  -0.00707	    0.00000	    0.00707	    0.01832	    0.03867	    0.08067
                      2	  -0.07449	  -0.03489	  -0.01668	  -0.00660	    0.00000	    0.00542	    0.01668	    0.03489	    0.07449
                      7	  -0.07383	  -0.03323	  -0.01542	  -0.00582	    0.00000	    0.00582	    0.01542	    0.03323	    0.07391
                     12	  -0.07287	  -0.03547	  -0.01762	  -0.00699	    0.00000	    0.00699	    0.01762	    0.03742	    0.07287
                     17	  -0.08345	  -0.04011	  -0.01918	  -0.00762	    0.00000	    0.00744	    0.01918	    0.04018	    0.08135
                     60	  -0.04937	  -0.02354	  -0.01150	  -0.00454	    0.00000	    0.00454	    0.01150	    0.02354	    0.04937
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              </tableData>
          </table>
       </product>
    </function>
    <function name="aero/c/CMNBETADOT">
    <description>YAW MOMENT DERIVATIVE FOR BETADOT</description>
    <product>
          <property>aero/betadot-rad_sec</property>
          <table>
            <independentVar lookup="row">aero/alpha-deg</independentVar>
            <tableData>
                    -10		    0.21331
                     -5		    0.20190
                      2		    0.19832
                      6		    0.18046
                     10		    0.16608
                     14		    0.20345
                     18		    0.19803
                     60		    0.11882
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            </tableData>
          </table>
       </product>
    </function>
    <function name="aero/c/CMNDAD">
    <description>YAWING MOMENT DUE TO AILERON DEFLECTION</description>
    <product>
          <property>fcs/roll-pos-deg</property>
          <table>
            <independentVar lookup="row">aero/alpha-deg</independentVar>
            <independentVar lookup="column">aero/beta-deg</independentVar>
            <tableData>
                                -20	        -10	         -5	         -2	          0	          2	          5	         10	         20
                    -10	  -0.00036	  -0.00035	  -0.00035	  -0.00035	  -0.00035	  -0.00034	  -0.00033	  -0.00031	  -0.00027
                      2	    0.00006	    0.00004	    0.00003	    0.00002	    0.00002	    0.00003	    0.00004	    0.00007	    0.00010
                      7	    0.00014	    0.00015	    0.00016	    0.00018	    0.00018	    0.00020	    0.00022	    0.00026	    0.00032
                     12	    0.00018	    0.00019	    0.00020	    0.00018	    0.00017	    0.00017	    0.00018	    0.00023	    0.00035
                     17	    0.00023	    0.00016	    0.00003	    0.00004	    0.00002	    0.00001	  -0.00001	    0.00001	    0.00007
                     60	  -0.00001	  -0.00001	  -0.00002	  -0.00002	  -0.00003	  -0.00001	  -0.00002	  -0.00002	  -0.00001
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            </tableData>
          </table>
       </product>
    </function>
    <function name="aero/c/CMNDRD">
    <description>YAWING MOMENT DUE TO RUDDER DEFLECTION</description>
    <product>
          <property>fcs/yaw-pos-deg</property>
          <table>
            <independentVar lookup="row">aero/alpha-deg</independentVar>
            <independentVar lookup="column">aero/beta-deg</independentVar>
            <tableData>
                                -20	        -10	         -5	         -2	          0	          2	          5	         10	         20
                    -10	  -0.00092	  -0.00189	  -0.00210	  -0.00205	  -0.00201	  -0.00198	  -0.00199	  -0.00208	  -0.00215
                      2	  -0.00108	  -0.00199	  -0.00197	  -0.00190	  -0.00184	  -0.00181	  -0.00184	  -0.00194	  -0.00209
                      7	  -0.00115	  -0.00192	  -0.00184	  -0.00177	  -0.00173	  -0.00172	  -0.00175	  -0.00185	  -0.00203
                     12	  -0.00116	  -0.00176	  -0.00169	  -0.00163	  -0.00159	  -0.00160	  -0.00163	  -0.00172	  -0.00188
                     17	  -0.00119	  -0.00157	  -0.00151	  -0.00146	  -0.00143	  -0.00143	  -0.00147	  -0.00156	  -0.00173
                     60	  -0.00002	  -0.00005	  -0.00007	  -0.00007	  -0.00008	  -0.00008	  -0.00013	  -0.00012	  -0.00016
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            </tableData>
          </table>
       </product>
    </function>
    <function name="aero/c/CMNP">
    <description>YAW DAMPING DERIVATIVE</description>
    <product>
          <property>aero/pb</property>
          <table>
            <independentVar lookup="row">aero/alpha-deg</independentVar>
            <tableData>
                    -10		    0.19919
                     -5		    0.11988
                      2		    0.01272
                      6		  -0.06794
                     10		  -0.10998
                     14		  -0.10817
                     18		  -0.08054
                     60		  -0.00111
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            </tableData>
          </table>
       </product>
    </function>
    <function name="aero/c/CMNR">
    <description>YAW MOMENT DUE TO ROLL RATE</description>
    <product>
          <property>aero/pb</property>
          <table>
            <independentVar lookup="row">aero/alpha-deg</independentVar>
            <tableData>
                    -10		  -0.22548
                     -5		  -0.21007
                      2		  -0.20516
                      6		  -0.21142
                     10		  -0.19527
                     14		  -0.22374
                     18		  -0.23331
                     60		  -0.12623
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            </tableData>
          </table>
       </product>
    </function>
    <function name="aero/coefficients/CDRAG">
      <sum>
          <property>aero/c/CFXB</property>
          <property>aero/c/CFXDAD</property>
          <property>aero/c/CFXDRD</property>
       </sum>
    </function>
  <axis name="DRAG">
    <function name="aero/force/DRAG">
    <product>
          <property>aero/qbar-psf</property>
          <property>metrics/Sw-sqft</property>
          <property>aero/coefficients/CDRAG</property>
       </product>
    </function>
  </axis>
    <function name="aero/coefficients/CROLL">
      <sum>
          <property>aero/c/CML1</property>
          <property>aero/c/CMLDAD</property>
          <property>aero/c/CMLDRD</property>
          <property>aero/c/CMLBETADOT</property>
          <property>aero/c/CMLP</property>
          <property>aero/c/CMLR</property>
       </sum>
    </function>
  <axis name="ROLL">
    <function name="aero/force/ROLL">
    <product>
          <property>aero/qbar-psf</property>
          <property>metrics/Sw-sqft</property>
          <property>metrics/bw-ft</property>
          <property>aero/coefficients/CROLL</property>
       </product>
    </function>
  </axis>
    <function name="aero/coefficients/CSIDE">
      <sum>
          <property>aero/c/CYDAD</property>
          <property>aero/c/CYDRD</property>
          <property>aero/c/CFYB</property>
          <property>aero/c/CFYP</property>
          <property>aero/c/CFYR</property>
       </sum>
    </function>
  <axis name="SIDE">
    <function name="aero/force/SIDE">
    <product>
          <property>aero/qbar-psf</property>
          <property>metrics/Sw-sqft</property>
          <property>aero/coefficients/CSIDE</property>
       </product>
    </function>
  </axis>
    <function name="aero/coefficients/CLIFT">
      <sum>
          <property>aero/c/CFZDAD</property>
          <property>aero/c/CFZDRD</property>
          <property>aero/c/CFZB</property>
          <property>aero/c/CFZDDS</property>
       </sum>
    </function>
  <axis name="LIFT">
    <function name="aero/force/LIFT">
    <product>
          <property>aero/qbar-psf</property>
          <property>metrics/Sw-sqft</property>
          <property>aero/coefficients/CLIFT</property>
       </product>
    </function>
  </axis>
    <function name="aero/coefficients/CPITCH">
      <sum>
          <property>aero/c/CMMDAD</property>
          <property>aero/c/CMMDRD</property>
          <property>aero/c/CMM1</property>
          <property>aero/c/CMMDDS</property>
          <property>aero/c/CMMALPHADOT</property>
          <property>aero/c/CMMBETADOT</property>
          <property>aero/c/CMMQ</property>
       </sum>
    </function>
  <axis name="PITCH">
    <function name="aero/force/PITCH">
    <product>
          <property>aero/qbar-psf</property>
          <property>metrics/Sw-sqft</property>
          <property>metrics/cbarw-ft</property>
          <property>aero/coefficients/CPITCH</property>
       </product>
    </function>
  </axis>
    <function name="aero/coefficients/CYAW">
      <sum>
          <property>aero/c/CMNDAD</property>
          <property>aero/c/CMNDRD</property>
          <property>aero/c/CMN1</property>
          <property>aero/c/CMNBETADOT</property>
          <property>aero/c/CMNP</property>
          <property>aero/c/CMNR</property>
       </sum>
    </function>
  <axis name="YAW">
    <function name="aero/force/YAW">
    <product>
          <property>aero/qbar-psf</property>
          <property>metrics/Sw-sqft</property>
          <property>metrics/bw-ft</property>
          <property>aero/coefficients/CYAW</property>
       </product>
    </function>
  </axis>
</aerodynamics>
